<?xml version="1.0"?>
<?xml-stylesheet type="text/xsl" href="http://jsbsim.sourceforge.net/JSBSim.xsl"?>
<!--
  FlightBox — AGM-88 HARM, a FlightBox-OWN JSBSim model built by the SAME slender-body recipe the six
  surface-to-air rounds are (doc/modules/ground/catalogue.md), because it is the same kind of object: a
  finned cylinder on a solid motor. The pinned JSBSim submodule carries no such model and is read-only
  (CLAUDE.md Prinzip 1). The whole <aerodynamics> block below is the AIM-120/V-750 deck's, unchanged
  except for the two moment constants that depend on THIS round's own proportions — it is
  NON-DIMENSIONAL and describes a finned cylindrical body, which this is.

  ===========================================================================================
  PROVENANCE.
    launch mass 355 kg / 780 lb   [T4] Wikipedia, AGM-88 HARM
    diameter 254 mm, length 4.14 m [T4] ibid.
    terminal speed  Mach 1.84 [T2, ED Early Access Guide p.34-42] against Mach 2.9 [T4] —
      [DISPUTED], and the ED figure is the one taken, because the rest of
      doc/modules/f16/weapons.md is built from that source and mixing sources inside one deck
      is worse than being slow. The other reading is carried in doc/air-to-ground.md §2.3.
    warhead 66.0 kg (WDU-21/B)    carried by core/FBStore.h, not by this file
    burn time                     [GAP] in every source -> [SET] 6.0 s
    everything else  [DERIVED] by the formula stated where it is used, or [SET] with its reason
  ===========================================================================================

  GEOMETRY, non-dimensionalised against the BODY cross-section:
    S = pi*d^2/4 = pi*0.2540^2/4 = 0.050671 m^2 = 0.545418 ft^2      [DERIVED]
    chord := d = 0.8333 ft [DERIVED] — the reference length of the pitch/yaw moments
    wingspan := 2.6*d = 2.1667 ft [SET, the shared fin-span-to-diameter proportion] — used only by
      the roll damping term
    length 4.14 m = 163 in

  MASS. Launch 353.8 kg = 780.0 lb; propellant 40.1 kg = 88.3 lb [DERIVED, rocket equation against the
  [T2] terminal Mach OVER A LAUNCH SPEED — this round leaves a PYLON at Mach 0.9, which is the one place
  it differs from the surface recipe]:
    dV = 1.84*295.1 - 0.9*295.1 = 543.0 - 265.6 = 277.4 m/s
    m_p = 353.8*(1 - 1/exp(277.4/2305)) = 40.1 kg,  burnout 313.7 kg
    total impulse = 40.1*2305 = 92 431 N*s over [SET] 6.0 s -> 15 405 N = 3 463 lbf
    Iyy = Izz = 0.84*m*L^2/12 = 313.13 slug*ft^2 [DERIVED]
    Ixx = m*r^2/2 = 2.1044 slug*ft^2 [DERIVED]
    CG at mid-body, station 81.5 in [SET].

  CONTROL. Cm_de = -CN_de * arm / chord = -1.2 * (152 - 81.5) in / 10.0 in = -8.46 [DERIVED];
  Cm_alpha = -9.00 [DERIVED] so the trim relation alpha = -Cm_de*de/Cm_alpha lands on the same
  ~0.41 rad (23.5 deg) full-fin design point every other round in this tree uses.

  THE HONEST CONSEQUENCE, stated rather than tuned away: at equal dynamic pressure this deck pulls the
  same class of g the AIM-120 does. No public aero deck exists for this round; inflating CN to reach a
  quoted g would be a number posing as physics — and where the fins saturate, the round misses even
  without a shutdown, which makes doc/air-to-ground.md §Knowledge 1's table an upper bound on the
  weapon rather than a description of it.
-->
<fdm_config name="AGM-88" version="2.0" release="ALPHA"
    xmlns:xsi="http://www.w3.org/2001/XMLSchema-instance"
    xsi:noNamespaceSchemaLocation="http://jsbsim.sourceforge.net/JSBSim.xsd">

  <fileheader>
    <author> FlightBox </author>
    <filecreationdate> 2026-07-28 </filecreationdate>
    <version> 1.0 </version>
    <description> AGM-88 HARM — FlightBox's own model </description>
    <note>
      Built from public geometry and mass figures plus the slender-body aerodynamic set this tree's
      AIM-120 model derives and documents; it is not derived from, and contains nothing out of, any
      restricted source. Per-number provenance in the banner above.
    </note>
  </fileheader>

  <metrics>
    <wingarea  unit="FT2"> 0.545418 </wingarea>
    <wingspan  unit="FT">  2.1667  </wingspan>
    <chord     unit="FT">  0.8333 </chord>
    <htailarea unit="FT2"> 0 </htailarea>
    <htailarm  unit="FT">  0 </htailarm>
    <vtailarea unit="FT2"> 0 </vtailarea>
    <vtailarm  unit="FT">  0 </vtailarm>
    <location name="AERORP" unit="IN">
      <x> 81.5 </x>
      <y> 0 </y>
      <z> 0 </z>
    </location>
    <location name="VRP" unit="IN">
      <x> 81.5 </x>
      <y> 0 </y>
      <z> 0 </z>
    </location>
  </metrics>

  <mass_balance>
    <ixx unit="SLUG*FT2">      2.1044 </ixx>
    <iyy unit="SLUG*FT2">    313.13 </iyy>
    <izz unit="SLUG*FT2">    313.13 </izz>
    <emptywt unit="LBS">     691.7 </emptywt>
    <location name="CG" unit="IN">
      <x> 81.5 </x>
      <y> 0 </y>
      <z> 0 </z>
    </location>
  </mass_balance>

  <!-- Present so the model is complete, not so they fire: a weapon in flight is given no ground to
       collide with by its owner (units/FBSimUnit's kWeaponNoGroundElevM). -->
  <ground_reactions>
    <contact type="STRUCTURE" name="NOSE_CONTACT">
      <location unit="IN"> <x> 0 </x> <y> 0 </y> <z> 0 </z> </location>
      <static_friction>  0 </static_friction>
      <dynamic_friction> 0 </dynamic_friction>
      <rolling_friction> 0 </rolling_friction>
      <spring_coeff  unit="LBS/FT">      10000 </spring_coeff>
      <damping_coeff unit="LBS/FT/SEC">  20000 </damping_coeff>
      <max_steer unit="DEG"> 0.0 </max_steer>
      <brake_group> NONE </brake_group>
      <retractable> 0 </retractable>
    </contact>
    <contact type="STRUCTURE" name="TAIL_CONTACT">
      <location unit="IN"> <x> 163 </x> <y> 0 </y> <z> 0 </z> </location>
      <static_friction>  0 </static_friction>
      <dynamic_friction> 0 </dynamic_friction>
      <rolling_friction> 0 </rolling_friction>
      <spring_coeff  unit="LBS/FT">      10000 </spring_coeff>
      <damping_coeff unit="LBS/FT/SEC">  20000 </damping_coeff>
      <max_steer unit="DEG"> 0.0 </max_steer>
      <brake_group> NONE </brake_group>
      <retractable> 0 </retractable>
    </contact>
  </ground_reactions>

  <!-- The grain sits AT the CG so the burn changes mass without walking the centre of gravity. -->
  <propulsion>
    <engine file="agm88-motor">
      <feed> 0 </feed>
      <thruster file="agm88-motor_nozzle">
        <location unit="IN"> <x> 163 </x> <y> 0 </y> <z> 0 </z> </location>
        <orient unit="DEG"> <roll> 0 </roll> <pitch> 0 </pitch> <yaw> 0 </yaw> </orient>
      </thruster>
    </engine>

    <tank type="FUEL">
      <location unit="IN"> <x> 81.5 </x> <y> 0 </y> <z> 0 </z> </location>
      <radius unit="IN"> 4.50 </radius>
      <grain_config type="CYLINDRICAL">
        <length unit="IN"> 29.5 </length>
        <bore_diameter unit="IN"> 1.80 </bore_diameter>
      </grain_config>
      <capacity unit="LBS"> 88.3 </capacity>
      <contents unit="LBS"> 88.3 </contents>
    </tank>
  </propulsion>

  <!-- The three normalised control channels every FlightBox airframe exposes (fdm/FBFdm.h), through a
       first-order actuator (lag c1 = 60 1/s, ~17 ms) into a +-25 deg fin deflection. -->
  <flight_control name="FCS: AGM-88 fins">
    <channel name="Pitch">
      <lag_filter name="fcs/elevator-actuator">
        <input> fcs/elevator-cmd-norm </input>
        <c1> 60.0 </c1>
        <clipto> <min> -1.0 </min> <max> 1.0 </max> </clipto>
      </lag_filter>
      <aerosurface_scale name="fcs/elevator-scale">
        <input> fcs/elevator-actuator </input>
        <range> <min> -0.4363 </min> <max> 0.4363 </max> </range>
        <output> fcs/elevator-pos-rad </output>
      </aerosurface_scale>
    </channel>
    <channel name="Yaw">
      <lag_filter name="fcs/rudder-actuator">
        <input> fcs/rudder-cmd-norm </input>
        <c1> 60.0 </c1>
        <clipto> <min> -1.0 </min> <max> 1.0 </max> </clipto>
      </lag_filter>
      <aerosurface_scale name="fcs/rudder-scale">
        <input> fcs/rudder-actuator </input>
        <range> <min> -0.4363 </min> <max> 0.4363 </max> </range>
        <output> fcs/rudder-pos-rad </output>
      </aerosurface_scale>
    </channel>
    <channel name="Roll">
      <lag_filter name="fcs/aileron-actuator">
        <input> fcs/aileron-cmd-norm </input>
        <c1> 60.0 </c1>
        <clipto> <min> -1.0 </min> <max> 1.0 </max> </clipto>
      </lag_filter>
      <aerosurface_scale name="fcs/aileron-scale">
        <input> fcs/aileron-actuator </input>
        <range> <min> -0.4363 </min> <max> 0.4363 </max> </range>
        <output> fcs/left-aileron-pos-rad </output>
      </aerosurface_scale>
    </channel>
  </flight_control>

  <aerodynamics>

    <axis name="AXIAL">
      <function name="aero/coefficient/CA">
        <description> Axial force (zero lift) </description>
        <product>
          <property> aero/qbar-psf </property>
          <property> metrics/Sw-sqft </property>
          <table>
            <independentVar> velocities/mach </independentVar>
            <tableData>
              0.0000  0.400
              0.6000  0.410
              0.8000  0.430
              0.9000  0.470
              0.9500  0.550
              1.0500  0.820
              1.2000  0.840
              1.5000  0.780
              2.0000  0.680
              2.5000  0.600
              3.0000  0.550
              4.0000  0.470
              5.0000  0.440
            </tableData>
          </table>
        </product>
      </function>
      <function name="aero/coefficient/CA_alpha">
        <description> Axial force due to angle of attack </description>
        <product>
          <property> aero/qbar-psf </property>
          <property> metrics/Sw-sqft </property>
          <value> 0.9 </value>
          <property> aero/alpha-rad </property>
          <property> aero/alpha-rad </property>
        </product>
      </function>
    </axis>

    <axis name="NORMAL">
      <function name="aero/coefficient/CN_alpha">
        <description> Normal force due to angle of attack </description>
        <product>
          <property> aero/qbar-psf </property>
          <property> metrics/Sw-sqft </property>
          <property> aero/alpha-rad </property>
          <table>
            <independentVar> velocities/mach </independentVar>
            <tableData>
              0.0000   9.00
              0.8000   9.20
              1.0500  11.00
              1.2000  11.50
              1.5000  10.50
              2.0000   9.50
              2.5000   8.80
              3.0000   8.20
              4.0000   7.40
              5.0000   7.00
            </tableData>
          </table>
        </product>
      </function>
      <function name="aero/coefficient/CN_alpha2">
        <description> Normal force, crossflow (nonlinear in alpha) </description>
        <product>
          <property> aero/qbar-psf </property>
          <property> metrics/Sw-sqft </property>
          <value> 10.0 </value>
          <property> aero/alpha-rad </property>
          <abs> <property> aero/alpha-rad </property> </abs>
        </product>
      </function>
      <function name="aero/coefficient/CN_de">
        <description> Normal force due to pitch fin deflection </description>
        <product>
          <property> aero/qbar-psf </property>
          <property> metrics/Sw-sqft </property>
          <value> 1.2 </value>
          <property> fcs/elevator-pos-rad </property>
        </product>
      </function>
    </axis>

    <axis name="SIDE">
      <function name="aero/coefficient/CY_beta">
        <description> Side force due to sideslip </description>
        <product>
          <property> aero/qbar-psf </property>
          <property> metrics/Sw-sqft </property>
          <property> aero/beta-rad </property>
          <value> -1.0 </value>
          <table>
            <independentVar> velocities/mach </independentVar>
            <tableData>
              0.0000   9.00
              0.8000   9.20
              1.0500  11.00
              1.2000  11.50
              1.5000  10.50
              2.0000   9.50
              2.5000   8.80
              3.0000   8.20
              4.0000   7.40
              5.0000   7.00
            </tableData>
          </table>
        </product>
      </function>
      <function name="aero/coefficient/CY_beta2">
        <description> Side force, crossflow (nonlinear in beta) </description>
        <product>
          <property> aero/qbar-psf </property>
          <property> metrics/Sw-sqft </property>
          <value> -10.0 </value>
          <property> aero/beta-rad </property>
          <abs> <property> aero/beta-rad </property> </abs>
        </product>
      </function>
      <function name="aero/coefficient/CY_dr">
        <description> Side force due to yaw fin deflection </description>
        <product>
          <property> aero/qbar-psf </property>
          <property> metrics/Sw-sqft </property>
          <value> -1.2 </value>
          <property> fcs/rudder-pos-rad </property>
        </product>
      </function>
    </axis>

    <axis name="PITCH">
      <function name="aero/coefficient/Cm_alpha">
        <description> Pitch moment due to angle of attack </description>
        <product>
          <property> aero/qbar-psf </property>
          <property> metrics/Sw-sqft </property>
          <property> metrics/cbarw-ft </property>
          <property> aero/alpha-rad </property>
          <value> -9.00 </value>
        </product>
      </function>
      <function name="aero/coefficient/Cm_q">
        <description> Pitch moment due to pitch rate </description>
        <product>
          <property> aero/qbar-psf </property>
          <property> metrics/Sw-sqft </property>
          <property> metrics/cbarw-ft </property>
          <property> aero/ci2vel </property>
          <property> velocities/q-aero-rad_sec </property>
          <value> -500.0 </value>
        </product>
      </function>
      <function name="aero/coefficient/Cm_de">
        <description> Pitch moment due to pitch fin deflection </description>
        <product>
          <property> aero/qbar-psf </property>
          <property> metrics/Sw-sqft </property>
          <property> metrics/cbarw-ft </property>
          <property> fcs/elevator-pos-rad </property>
          <value> -8.46 </value>
        </product>
      </function>
    </axis>

    <axis name="YAW">
      <function name="aero/coefficient/Cn_beta">
        <description> Yaw moment due to sideslip </description>
        <product>
          <property> aero/qbar-psf </property>
          <property> metrics/Sw-sqft </property>
          <property> metrics/cbarw-ft </property>
          <property> aero/beta-rad </property>
          <value> 9.00 </value>
        </product>
      </function>
      <function name="aero/coefficient/Cn_r">
        <description> Yaw moment due to yaw rate </description>
        <product>
          <property> aero/qbar-psf </property>
          <property> metrics/Sw-sqft </property>
          <property> metrics/cbarw-ft </property>
          <property> aero/ci2vel </property>
          <property> velocities/r-aero-rad_sec </property>
          <value> -500.0 </value>
        </product>
      </function>
      <function name="aero/coefficient/Cn_dr">
        <description> Yaw moment due to yaw fin deflection </description>
        <product>
          <property> aero/qbar-psf </property>
          <property> metrics/Sw-sqft </property>
          <property> metrics/cbarw-ft </property>
          <property> fcs/rudder-pos-rad </property>
          <value> 8.46 </value>
        </product>
      </function>
    </axis>

    <axis name="ROLL">
      <function name="aero/coefficient/Cl_p">
        <description> Roll moment due to roll rate </description>
        <product>
          <property> aero/qbar-psf </property>
          <property> metrics/Sw-sqft </property>
          <property> metrics/bw-ft </property>
          <property> aero/bi2vel </property>
          <property> velocities/p-aero-rad_sec </property>
          <value> -12.0 </value>
        </product>
      </function>
      <function name="aero/coefficient/Cl_da">
        <description> Roll moment due to roll fin deflection </description>
        <product>
          <property> aero/qbar-psf </property>
          <property> metrics/Sw-sqft </property>
          <property> metrics/bw-ft </property>
          <property> fcs/left-aileron-pos-rad </property>
          <value> 0.05 </value>
        </product>
      </function>
    </axis>

  </aerodynamics>

</fdm_config>
