<?xml version="1.0"?>
<!-- FlightBox — AIM-7F/M Sparrow solid rocket motor, GENERATED by tools/gen_air_stores.py.

     propellant   m_p = m0*(1 - 1/exp(dV/ve)) = 231.0*(1 - 1/exp(930/2305))
                      = 76.7 kg = 169.1 lb
                      [DERIVED, the tree's shared Isp 235 s -> ve = 2305 m/s]
     dV is a DELTA over the 250 m/s separation speed: an air-launched round starts with the
     shooter's own energy, which is the one place this recipe differs from the surface-to-air one.
     total impulse = 76.7 * 2305 = 176813 N*s
     boost   35363 N (7950 lbf) x 3.0 s
     sustain 11788 N (2650 lbf) x 6.0 s, 40 % of the impulse
     JSBSim's contract: the table is indexed by PROPELLANT BURNED (lb) and yields VACUUM thrust (lbf);
     the engine consumes wdot = thrust/Isp itself, so burn TIME is an outcome and never stated here.
     THE BURN SPLIT IS [SET] within the class bound of 2-15 s that core/FBStore.h's R-27R row already
     declares; no public source gives one for any round in this file.
-->
<rocket_engine name="AIM-7F/M Sparrow motor (FlightBox)">

  <isp> 235 </isp>

  <!-- Ignition transient, [SET] 60 ms, as every other FlightBox motor. -->
  <builduptime> 0.06 </builduptime>

  <thrust_table name="propulsion/thrust_prop_remain" type="internal">
    <tableData><!--
      propellant burned (lb)   vacuum thrust (lbf) -->
       0.00       7949.8
     101.49       7949.8
     101.69       2649.9
     168.95       2649.9
     169.15          0.0
    </tableData>
  </thrust_table>

</rocket_engine>
