<?xml version="1.0"?>
<!-- FlightBox — R550 Magic 1 solid rocket motor, GENERATED by tools/gen_air_stores.py.

     propellant   m_p = m0*(1 - 1/exp(dV/ve)) = 89.0*(1 - 1/exp(635/2305))
                      = 21.4 kg = 47.3 lb
                      [DERIVED, the tree's shared Isp 235 s -> ve = 2305 m/s]
     dV is a DELTA over the 250 m/s separation speed: an air-launched round starts with the
     shooter's own energy, which is the one place this recipe differs from the surface-to-air one.
     total impulse = 21.4 * 2305 = 49412 N*s
     boost   12353 N (2777 lbf) x 4.0 s
     single-pulse motor: no sustainer, which is what an infrared dogfight round has
     JSBSim's contract: the table is indexed by PROPELLANT BURNED (lb) and yields VACUUM thrust (lbf);
     the engine consumes wdot = thrust/Isp itself, so burn TIME is an outcome and never stated here.
     THE BURN SPLIT IS [SET] within the class bound of 2-15 s that core/FBStore.h's R-27R row already
     declares; no public source gives one for any round in this file.
-->
<rocket_engine name="R550 Magic 1 motor (FlightBox)">

  <isp> 235 </isp>

  <!-- Ignition transient, [SET] 60 ms, as every other FlightBox motor. -->
  <builduptime> 0.06 </builduptime>

  <thrust_table name="propulsion/thrust_prop_remain" type="internal">
    <tableData><!--
      propellant burned (lb)   vacuum thrust (lbf) -->
       0.00       2777.0
      47.27       2777.0
      47.27          0.0
    </tableData>
  </thrust_table>

</rocket_engine>
