<?xml version="1.0"?>
<?xml-stylesheet type="text/xsl" href="http://jsbsim.sourceforge.net/JSBSim.xsl"?>
<!--
  FlightBox — MiG-29 9-12 "Fulcrum-A", a FlightBox-OWN JSBSim model.

  WHY IT IS HERE AND NOT IN vendor/. FlightBox flies from ONE model root, sim/assets/aircraft
  (missions/FBModelRoots.h); the pinned JSBSim submodule is the upstream BASIS that
  `make -C sim verify-models` diffs every copy against. This model has NO upstream — the submodule
  carries no MiG-29 and is read-only (CLAUDE.md Prinzip 1) — so it is declared FlightBox-own in
  sim/assets/MODEL-DELTAS.md and there is nothing to diff. Nothing under vendor/ is touched by this
  file's existence. Built to doc/mig29/flight-model-spec.md, section by section, in that file's §11
  build order.

  ============================================================================================
  READ THIS BEFORE QUOTING ANY NUMBER BELOW AS A MiG-29 PROPERTY.

  The F-16 model FlightBox flies rests on NASA TP-1538: a published, full-envelope wind-tunnel
  aerodynamic dataset. THERE IS NO MiG-29 EQUIVALENT IN THE PUBLIC DOMAIN, AT ANY CONFIDENCE TIER.
  For this aircraft the ENVELOPE is documented and the COEFFICIENTS are not. Every aerodynamic number
  in this file is therefore one of exactly four things, and each carries its tag:

    [INV]      INVERTED from a documented envelope anchor — a documented flight condition plus the
               equations of motion produce the coefficient. The anchor is named at the number.
    [GEO]      COMPUTED FROM GEOMETRY by a standard method (DATCOM / lifting-line / tail volume).
               The formula is written out at the number, with its inputs.
    [ANALOGY]  TAKEN FROM A DIFFERENT AIRCRAFT'S PUBLIC DATA, declared as such. See the high-alpha
               statement below.
    [SET]      A DECLARED FlightBox SETTING. Nobody publishes it; the reasoning is stated and the
               consequence is measurable.

  Documented values that go in unchanged carry their source instead: [DCS-FM p.NN] (DCS MIG-29 Flight
  Manual, printed page), [DCS-EA p.NN] (DCS MiG-29A Early Access Manual), [T3] (established
  literature: Jane's-derived compendia, engine-maker data). [DERIVED] marks arithmetic on those.
  [GAP] marks something nobody knows that is NOT guessed here.

  THE HIGH-ALPHA STATEMENT, reproduced verbatim from spec §6.4 as that section requires:

     The MiG-29's aerodynamic behaviour above the AoA limiter (26 deg) is not publicly documented at
     any confidence tier. This model's high-alpha coefficients are taken by DECLARED ANALOGY from the
     NASA F/A-18 HARV simulation database (Strickland, Bundick, Messina, Hoffler, Carzoo, Yeager,
     Beissner: "Simulation model of the F/A-18 high angle-of-attack research vehicle utilized for the
     design of advanced control laws", NASA TM-110216, May 1996 — aerodynamic database covering
     alpha -10..+90 deg, beta +-20 deg, M 0..2.0, 0..60,000 ft). The F/A-18 is chosen because it
     shares the three features that dominate this regime: leading-edge extensions, twin canted
     vertical tails, and twin podded engines with a wide fuselage tunnel. It is NOT a MiG-29, its LEX
     is a different size and shape, and its wing sweep and loading differ. Every coefficient sourced
     this way is tagged [ANALOGY] in this deck and MUST NOT be quoted as a MiG-29 property.

  What the analogy actually supplies here, concretely, so nobody has to guess how far it reaches:
  the SHAPE of four things past the linear range — the leading-edge vortex lift increment and its
  breakdown above ~32 deg, the nose-up pitching-moment departure above ~38 deg, the loss of
  directional stability (Cnbeta sign change) above ~33 deg, and the decay of roll damping and aileron
  power with alpha. Nothing below alpha 20 deg comes from it.

  THE MODEL MUST NOT BE CLAIMED TO PREDICT MiG-29 SPIN BEHAVIOUR.
  ============================================================================================

  STRUCTURAL FRAME. Origin at the NOSE TIP, x positive AFT, y positive to starboard, z positive up,
  z = 0 on the fuselage horizontal reference line ([DCS-FM p.9] notes the nose is tilted down relative
  to that line for over-the-nose view). Every station below is therefore a positive number and reads
  as "inches aft of the nose". Overall length 17.32 m = 682 in [DCS-FM p.14].
-->
<fdm_config name="MiG-29 9-12" version="2.0" release="ALPHA"
    xmlns:xsi="http://www.w3.org/2001/XMLSchema-instance"
    xsi:noNamespaceSchemaLocation="http://jsbsim.sourceforge.net/JSBSim.xsd">

  <fileheader>
    <author> FlightBox </author>
    <license licenseName="GPL-2.0-or-later" licenseURL="https://www.gnu.org/licenses/gpl-2.0.html"/>
    <filecreationdate> 2026-07-28 </filecreationdate>
    <version> 1.0 </version>
    <description> MiG-29 9-12 Fulcrum-A — FlightBox's own model, built to doc/mig29/flight-model-spec.md </description>
    <note>
      INVERTED FROM PUBLISHED ENVELOPE DATA, NOT MEASURED. No MiG-29 aerodynamic dataset is public at
      any confidence tier. The geometry, masses, engine statics and the flight envelope are documented;
      every aerodynamic coefficient here is inverted from an envelope anchor, computed from geometry,
      taken by the DECLARED F/A-18 HARV analogy (NASA TM-110216) for the high-alpha regime, or is a
      declared FlightBox setting. Each number says which, next to itself. This is not a wind-tunnel
      deck and must not be presented as one. release=ALPHA until the spec §8 anchor table passes.
    </note>
    <reference refID="DCS-FM" author="Eagle Dynamics" title="DCS MIG-29 Flight Manual (2018), printed pp. 9-14, 81" date="2018"/>
    <reference refID="DCS-EA" author="Eagle Dynamics" title="DCS MiG-29A Early Access Manual (2025), pp. 19, 55-64, 75-80" date="2025"/>
    <reference refID="NASA TM-110216" author="Strickland et al." title="Simulation model of the F/A-18 high angle-of-attack research vehicle (the DECLARED high-alpha analogy)" date="05/1996"/>
    <reference refID="None" author="Klimov / MMP Chernyshev (T3)" title="RD-33 engine scalars" date="n/a"/>
  </fileheader>

  <!-- ============================== 2. GEOMETRY (spec §2) ============================== -->
  <metrics>
    <!-- [DCS-FM p.14] 38.056 m^2 = 409.6 ft^2. Spec §12.3 warns that five significant figures on an
         integral-layout aircraft is a CONVENTION MARKER, not accuracy: no source states whether it is
         the exposed wing, wing + carry-through, or wing + carry-through + LERX. THE CONVENTION IS
         DECLARED HERE AND NEVER CHANGED — every coefficient in <aerodynamics> is non-dimensionalised
         against exactly this number, so its meaning is fixed by use even where its definition is not. -->
    <wingarea unit="FT2"> 409.6 </wingarea>
    <!-- [DCS-FM p.14] 11.36 m = 37.27 ft. -->
    <wingspan unit="FT"> 37.27 </wingspan>
    <!-- [DERIVED] mean GEOMETRIC chord = S/b = 38.056/11.36 = 3.35 m = 10.99 ft. The true MAC differs
         because of taper and the LERX; a planform reconstruction from a scaled 3-view would refine it.
         Expect +-10 % until then. [GAP] -->
    <chord unit="FT"> 10.99 </chord>
    <!-- [DCS-FM p.10] stabilator 7.05 m^2 = 75.88 ft^2, read as BOTH halves per Soviet convention
         [ABL]. If it is per-half every pitch derivative below doubles. -->
    <htailarea unit="FT2"> 75.88 </htailarea>
    <!-- [SET] 5.2 m = 17.06 ft, stabilator quarter-chord to CG. No source; the spec's own expectation
         for a 17.32 m airframe is 5.0-5.5 m. Closes only with a scaled 3-view. -->
    <htailarm unit="FT"> 17.06 </htailarm>
    <!-- [SET] 2 x 5.5 m^2 = 11.0 m^2 = 118.4 ft^2 of FIN. [DCS-FM p.10]'s "1.25 m^2 each" is the
         RUDDER (the control surface), not the fin — spec §12.3 records that reading; taken as fin
         area the aircraft would be directionally hopeless. -->
    <vtailarea unit="FT2"> 118.4 </vtailarea>
    <!-- [SET] 5.0 m = 16.40 ft. Explicitly NOT left at 0: doc/f16/flight-model.md §12.3 flags the
         F-16 deck's vtailarm = 0 as an unfilled field, and this file does not repeat it. -->
    <vtailarm unit="FT"> 16.40 </vtailarm>

    <!-- AERORP sits ON the design CG station (see <mass_balance>), so every moment coefficient in
         <aerodynamics> is a moment ABOUT THAT POINT and the static margin is exactly -dCm/dalpha over
         CLalpha — no hidden transfer term. The ACTUAL CG still moves with fuel and stores, and JSBSim
         itself transfers the aerodynamic force to wherever the CG currently is, so CG travel through a
         sortie changes trim and stability as it should. [SET] -->
    <location name="AERORP" unit="IN"> <x> 366 </x> <y> 0 </y> <z> 0 </z> </location>
    <!-- [SET] cockpit sill ~4.60 m aft of the nose, seat reference 0.55 m above the reference line.
         Constrained but not fixed by [DCS-EA p.75]'s taxi-geometry drawing. -->
    <location name="EYEPOINT" unit="IN"> <x> 181 </x> <y> 0 </y> <z> 21.7 </z> </location>
    <location name="VRP" unit="IN"> <x> 0 </x> <y> 0 </y> <z> 0 </z> </location>
  </metrics>

  <!-- ============================== 3. MASS AND INERTIA (spec §3) ==============================
       THE MASS CLOSURE THAT VALIDATES FOUR INDEPENDENT NUMBERS AT ONCE [DERIVED, spec §3.1]:
         10,900 (empty) + 3,200 (internal fuel) + 100 (pilot) + 926 (2x R-27R + 4x R-73) + 125 (ammo)
         = 15,251 kg  against the documented normal takeoff weight of 15,300 kg [DCS-FM p.14].
       Agreement 0.3 %. THE DECK CARRIES THE FIRST THREE (14,200 kg); the last two are stores and
       ammunition, which reach JSBSim as <pointmass> through fdm/FBFdm::AddStorePointMass at load time
       and are therefore a module-level concern, exactly as on the F-16.
  -->
  <mass_balance negated_crossproduct_inertia="true">
    <!-- [SET] — the largest single setting in the model, and the derivation is spec §3.2, reproduced
         so it can be criticised rather than trusted:
           1. take the pinned F-16's tensor (empty 7,893 kg; 9,496 / 55,814 / 63,100 / -982 slug*ft^2);
           2. convert to radii of gyration normalised by each axis's natural length — kx/b = 0.128,
              ky/L = 0.206, kz/((b+L)/2) = 0.263 — which removes both mass and size;
           3. apply to the MiG-29 (b = 11.36 m, L = 17.32 m, m = 10,900 kg):
              Ixx 23,080 / Iyy 138,750 / Izz 155,000 kg*m^2, Ixz scaled by the F-16's Ixz/Izz = -0.0156;
           4. TWIN-ENGINE CORRECTION, applied and declared: two ~1.1 t engines at +-0.75 m add
              2 * 1100 * 0.75^2 = 1,240 kg*m^2 to Ixx over a centreline placement (~+5 %); widely
              spaced wing fuel adds more. Ixx is raised by 10 % to 25,400 kg*m^2.
         Converted at 1 kg*m^2 = 0.737562 slug*ft^2.
         THESE ARE THE FIRST THING TO RE-DERIVE if the measured roll response misses — Ixx and the
         roll control power (<aerodynamics> Clda) are the only two knobs that set roll acceleration,
         and both are [SET]. -->
    <ixx unit="SLUG*FT2"> 18730 </ixx>
    <iyy unit="SLUG*FT2"> 102340 </iyy>
    <izz unit="SLUG*FT2"> 114320 </izz>
    <ixy unit="SLUG*FT2"> 0 </ixy>
    <ixz unit="SLUG*FT2"> -1780 </ixz>
    <iyz unit="SLUG*FT2"> 0 </iyz>

    <!-- [DCS-FM p.14] 10,900 kg; [T3] agrees at 24,030 lb. High confidence. -->
    <emptywt unit="LBS"> 24030 </emptywt>

    <!-- [SET] 366 in = 9.30 m aft of the nose = 53.7 % of length. Fixed by the ONE documented
         constraint that touches it: the wheel base is 3.645 m [DCS-FM p.10] and the CG must sit just
         ahead of the mains — at these stations the nose gear carries
         (381.9 - 366)/143.5 = 11.1 % of the weight [DERIVED], which is the normal 8-15 % band for a
         tricycle fighter. Lower and the nose wheel loses steering authority; higher and rotation
         needs more stabilator than the aircraft has. -->
    <location name="CG" unit="IN"> <x> 366 </x> <y> 0 </y> <z> 0 </z> </location>

    <!-- [SET] 100 kg pilot + kit as ONE point mass, mirroring the F-16 deck's single "Pilot" mass.
         100 kg is the spec's declared figure; no source gives it. -->
    <pointmass name="Pilot">
      <weight unit="LBS"> 220 </weight>
      <location unit="IN"> <x> 181 </x> <y> 0 </y> <z> 0 </z> </location>
    </pointmass>
  </mass_balance>

  <!-- ============================== 4. GROUND REACTIONS (spec §4) ============================== -->
  <ground_reactions>
    <!-- Gear stations [DERIVED from the two documented dimensions]: wheel base 3.645 m = 143.5 in and
         wheel track 3.09 m = +-60.8 in [DCS-FM p.10]. With the mains at 381.9 in the nose gear falls
         at 238.4 in = 6.06 m aft of the nose — "well behind the pilot's seat", which is what
         [DCS-EA p.75]'s turning diagram describes. Wheel contact height 2.20 m below the reference
         line [SET]; the nose strut is 0.05 m longer, giving ~1 deg nose-up ground attitude.
         Spring and damping [SET]: the pinned F-16's values scaled by the empty-weight ratio
         24,030/17,400 = 1.38 [DERIVED], then rounded. Friction coefficients are the F-16 deck's
         (0.8 / 0.5 / 0.02) — a dry concrete runway is a dry concrete runway [ANALOGY]. -->
    <contact type="BOGEY" name="NOSE_LG">
      <location unit="IN"> <x> 238.4 </x> <y> 0 </y> <z> -88.6 </z> </location>
      <static_friction> 0.8 </static_friction>
      <dynamic_friction> 0.5 </dynamic_friction>
      <rolling_friction> 0.02 </rolling_friction>
      <spring_coeff unit="LBS/FT"> 24000 </spring_coeff>
      <damping_coeff unit="LBS/FT/SEC"> 6000 </damping_coeff>
      <!-- [DCS-FM p.10] +-30 deg taxi. The +-8 deg takeoff figure is an OPERATING limit the flight
           control channel applies through a groundspeed schedule, not a hardware stop. -->
      <max_steer unit="DEG"> 30 </max_steer>
      <brake_group> NOSE </brake_group>
      <retractable>1</retractable>
    </contact>
    <contact type="BOGEY" name="LEFT_MLG">
      <location unit="IN"> <x> 381.9 </x> <y> -60.8 </y> <z> -86.6 </z> </location>
      <static_friction> 0.8 </static_friction>
      <dynamic_friction> 0.5 </dynamic_friction>
      <rolling_friction> 0.02 </rolling_friction>
      <spring_coeff unit="LBS/FT"> 52000 </spring_coeff>
      <damping_coeff unit="LBS/FT/SEC"> 11000 </damping_coeff>
      <max_steer unit="DEG"> 0.0 </max_steer>
      <brake_group> LEFT </brake_group>
      <retractable>1</retractable>
    </contact>
    <contact type="BOGEY" name="RIGHT_MLG">
      <location unit="IN"> <x> 381.9 </x> <y> 60.8 </y> <z> -86.6 </z> </location>
      <static_friction> 0.8 </static_friction>
      <dynamic_friction> 0.5 </dynamic_friction>
      <rolling_friction> 0.02 </rolling_friction>
      <spring_coeff unit="LBS/FT"> 52000 </spring_coeff>
      <damping_coeff unit="LBS/FT/SEC"> 11000 </damping_coeff>
      <max_steer unit="DEG"> 0.0 </max_steer>
      <brake_group> RIGHT </brake_group>
      <retractable>1</retractable>
    </contact>

    <!-- STRUCTURE contacts [SET stations, from the declared frame]. The NOZZLE pair is not decoration:
         [DCS-EA p.78] warns that "rapid full aft movement of the stick may result in the exhaust
         nozzles hitting the runway", so the nozzles are a DOCUMENTED ground-strike point and belong in
         the deck. At x = 660 in, z = -20 in, pivoting on the mains, they touch at
         atan((86.6-20)/(660-381.9)) = 13.5 deg of pitch [DERIVED] — and [DCS-EA p.79]'s independent
         touchdown instruction "do not exceed 13 deg AoA" lands on the same number from the other side,
         which is the strongest corroboration available for a geometry nobody publishes.
         JSBSim has NO structural failure load for any contact (same as the F-16), and none is invented
         here: the physics verdict stays with core/FBFlightMonitor. -->
    <contact type="STRUCTURE" name="NOSE_TIP">
      <location unit="IN"> <x> 0 </x> <y> 0 </y> <z> -12 </z> </location>
      <static_friction> 0.2 </static_friction> <dynamic_friction> 0.2 </dynamic_friction>
      <rolling_friction> 0.2 </rolling_friction>
      <spring_coeff unit="LBS/FT"> 12000 </spring_coeff>
      <damping_coeff unit="LBS/FT/SEC"> 2500 </damping_coeff>
    </contact>
    <contact type="STRUCTURE" name="LEFT_WINGTIP">
      <location unit="IN"> <x> 390 </x> <y> -223.6 </y> <z> 0 </z> </location>
      <static_friction> 0.2 </static_friction> <dynamic_friction> 0.2 </dynamic_friction>
      <rolling_friction> 0.2 </rolling_friction>
      <spring_coeff unit="LBS/FT"> 12000 </spring_coeff>
      <damping_coeff unit="LBS/FT/SEC"> 2500 </damping_coeff>
    </contact>
    <contact type="STRUCTURE" name="RIGHT_WINGTIP">
      <location unit="IN"> <x> 390 </x> <y> 223.6 </y> <z> 0 </z> </location>
      <static_friction> 0.2 </static_friction> <dynamic_friction> 0.2 </dynamic_friction>
      <rolling_friction> 0.2 </rolling_friction>
      <spring_coeff unit="LBS/FT"> 12000 </spring_coeff>
      <damping_coeff unit="LBS/FT/SEC"> 2500 </damping_coeff>
    </contact>
    <contact type="STRUCTURE" name="LEFT_NOZZLE">
      <location unit="IN"> <x> 660 </x> <y> -29.5 </y> <z> -20 </z> </location>
      <static_friction> 0.2 </static_friction> <dynamic_friction> 0.2 </dynamic_friction>
      <rolling_friction> 0.2 </rolling_friction>
      <spring_coeff unit="LBS/FT"> 12000 </spring_coeff>
      <damping_coeff unit="LBS/FT/SEC"> 2500 </damping_coeff>
    </contact>
    <contact type="STRUCTURE" name="RIGHT_NOZZLE">
      <location unit="IN"> <x> 660 </x> <y> 29.5 </y> <z> -20 </z> </location>
      <static_friction> 0.2 </static_friction> <dynamic_friction> 0.2 </dynamic_friction>
      <rolling_friction> 0.2 </rolling_friction>
      <spring_coeff unit="LBS/FT"> 12000 </spring_coeff>
      <damping_coeff unit="LBS/FT/SEC"> 2500 </damping_coeff>
    </contact>
    <contact type="STRUCTURE" name="LEFT_FIN_TIP">
      <location unit="IN"> <x> 560 </x> <y> -60 </y> <z> 110 </z> </location>
      <static_friction> 0.2 </static_friction> <dynamic_friction> 0.2 </dynamic_friction>
      <rolling_friction> 0.2 </rolling_friction>
      <spring_coeff unit="LBS/FT"> 12000 </spring_coeff>
      <damping_coeff unit="LBS/FT/SEC"> 2500 </damping_coeff>
    </contact>
    <contact type="STRUCTURE" name="RIGHT_FIN_TIP">
      <location unit="IN"> <x> 560 </x> <y> 60 </y> <z> 110 </z> </location>
      <static_friction> 0.2 </static_friction> <dynamic_friction> 0.2 </dynamic_friction>
      <rolling_friction> 0.2 </rolling_friction>
      <spring_coeff unit="LBS/FT"> 12000 </spring_coeff>
      <damping_coeff unit="LBS/FT/SEC"> 2500 </damping_coeff>
    </contact>
  </ground_reactions>

  <!-- ============================== 5. PROPULSION (spec §5) ==============================
       Two RD-33 [DCS-FM p.14, p.81]. Everything about the ENGINE is in engine/RD-33.xml, including
       the frozen-analogy rule for its thrust surfaces; what belongs here is only PLACEMENT and FEED.

       Lateral separation [SET] +-0.75 m = +-29.5 in: no source gives it, the spec expects 1.4-1.6 m
       for an 11.36 m span with this fuselage tunnel. The number is not cosmetic — it IS the
       asymmetric-thrust yaw moment: at full augmentation, one engine out gives
       81.4 kN * 0.75 m = 61 kN*m [DERIVED], which the rudders must trim, and <aerodynamics>'s Cndr is
       sized against exactly that (see there).
       Nozzle station 640 in, 8 in below the reference line [SET]; the small vertical offset is the
       thrust pitch couple. Cant/toe-in assumed 0 deg [SET], thrust along body x.

       FEED: both engines feed all seven tanks. JSBSim's FGPropulsion::ConsumeFuel drains all
       priority-1 tanks SIMULTANEOUSLY; the real aircraft certainly sequences (external -> forward ->
       aft) to manage CG, but the sequence is [GAP] and is not invented here. Consequence to know: CG
       travel through a sortie is the tank-centroid travel of a uniform drain, not of the real
       schedule. -->
  <propulsion>
    <engine file="RD-33">
      <feed>0</feed> <feed>1</feed> <feed>2</feed> <feed>3</feed>
      <feed>4</feed> <feed>5</feed> <feed>6</feed>
      <thruster file="RD-33-nozzle">
        <location unit="IN"> <x> 640 </x> <y> -29.5 </y> <z> -8 </z> </location>
        <orient unit="DEG"> <roll> 0.0 </roll> <pitch> 0.0 </pitch> <yaw> 0.0 </yaw> </orient>
      </thruster>
    </engine>
    <engine file="RD-33">
      <feed>0</feed> <feed>1</feed> <feed>2</feed> <feed>3</feed>
      <feed>4</feed> <feed>5</feed> <feed>6</feed>
      <thruster file="RD-33-nozzle">
        <location unit="IN"> <x> 640 </x> <y> 29.5 </y> <z> -8 </z> </location>
        <orient unit="DEG"> <roll> 0.0 </roll> <pitch> 0.0 </pitch> <yaw> 0.0 </yaw> </orient>
      </thruster>
    </engine>

    <!-- TANKS. Internal fuel 3,200 kg = 7,055 lb [T3]; [T4] gives 3,375-3,500 kg, a 10 % spread that
         propagates straight into the range anchors A7/A8.
         THE STRUCTURE IS DOCUMENTED, THE CAPACITIES ARE NOT. [DCS-FM p.9] names, fore to aft: tank #1,
         tank #2, the integral tank #3 ("the main fuel source of the aircraft"), then the engine bays
         flanked by two tanks #3a. [T3] adds one tank in each wing. Five named compartments plus two
         wings is seven, and the two accounts DO NOT RECONCILE [GAP] — this deck models all seven and
         says so rather than silently picking one source.
         The per-tank split is [SET], anchored only by "#3 is by far the largest" (~50 %):
           #1 847 + #2 988 + #3 3,528 + #3a L/R 564 each + wing L/R 282 each = 7,055 lb [DERIVED sum].
         Stations [SET] from the documented fore-to-aft ORDER and the tank-#3-is-central statement. -->
    <tank type="FUEL"> <!-- 0: tank #1, forward fuselage -->
      <location unit="IN"> <x> 280 </x> <y> 0 </y> <z> 0 </z> </location>
      <capacity unit="LBS"> 847 </capacity> <contents unit="LBS"> 847 </contents>
    </tank>
    <tank type="FUEL"> <!-- 1: tank #2 -->
      <location unit="IN"> <x> 330 </x> <y> 0 </y> <z> 0 </z> </location>
      <capacity unit="LBS"> 988 </capacity> <contents unit="LBS"> 988 </contents>
    </tank>
    <tank type="FUEL"> <!-- 2: tank #3, integral, the main tank -->
      <location unit="IN"> <x> 380 </x> <y> 0 </y> <z> 0 </z> </location>
      <capacity unit="LBS"> 3528 </capacity> <contents unit="LBS"> 3528 </contents>
    </tank>
    <tank type="FUEL"> <!-- 3: tank #3a left, flanking the engine bay -->
      <location unit="IN"> <x> 430 </x> <y> -30 </y> <z> 0 </z> </location>
      <capacity unit="LBS"> 564 </capacity> <contents unit="LBS"> 564 </contents>
    </tank>
    <tank type="FUEL"> <!-- 4: tank #3a right -->
      <location unit="IN"> <x> 430 </x> <y> 30 </y> <z> 0 </z> </location>
      <capacity unit="LBS"> 564 </capacity> <contents unit="LBS"> 564 </contents>
    </tank>
    <tank type="FUEL"> <!-- 5: left wing -->
      <location unit="IN"> <x> 390 </x> <y> -100 </y> <z> -5 </z> </location>
      <capacity unit="LBS"> 282 </capacity> <contents unit="LBS"> 282 </contents>
    </tank>
    <tank type="FUEL"> <!-- 6: right wing -->
      <location unit="IN"> <x> 390 </x> <y> 100 </y> <z> -5 </z> </location>
      <capacity unit="LBS"> 282 </capacity> <contents unit="LBS"> 282 </contents>
    </tank>
  </propulsion>

  <!-- ============================== 7. FLIGHT CONTROL (spec §7) ==============================
       THE HEADLINE, because it changes everything relative to the F-16 module:

       The MiG-29 9-12 has a CONVENTIONAL, MECHANICALLY-SIGNALLED flight control system with hydraulic
       boost, a variable-gearing unit (ARU), a limiter unit (SOS) and a three-axis damper (part of the
       SAU AFCS). IT IS NOT FLY-BY-WIRE. There is no FLCS inside this deck to bypass, and therefore
       fcs/fbw-override has no analogue here and is not declared.

       FlightBox's systems/FBFlightControl wraps this deck FROM THE OUTSIDE, as it does every module:
       it writes fcs/*-cmd-norm and the channels below turn those into surface deflections. The F-16's
       peculiarity (a real FLCS inside the deck) is the exception in FlightBox, not the rule, and this
       airframe is the rule.

       WHAT IS DELIBERATELY NOT HERE: the SOS angle-of-attack limiter (26 deg). Spec §7.3 puts it in
       systems/FBFlightControl and not in the deck, for three reasons that all still hold: it is a
       FORCE effect on the stick and this deck sees normalised commands; it must be OVERRIDABLE
       (~17 kgf of extra aft stick defeats it), which is a pilot-model decision; and burying it here
       would hide it from core/FBFlightMonitor, whose whole point is that the limiter is not the judge.
       This deck therefore has NO alpha limiting at all, and the envelope harness measures what the
       bare airframe does. -->
  <flight_control name="MiG-29 mechanical FCS">

    <channel name="Pitch">
      <!-- THE ARU (avtomat regulirovaniya upravleniya), spec §7.2. The ONE documented fact: the
           stabilator's available travel is roughly halved between the takeoff/landing configuration
           and the in-flight configuration — 15 deg / 35 deg becomes 5 deg 45' / 17 deg 45'
           [DCS-FM p.10]. That is the classic Soviet q-scheduled GEARING CHANGER: as dynamic pressure
           rises it reduces stick-to-stabilator gearing, so a given stick displacement buys a roughly
           constant g instead of a constant deflection.

           MODELLED AS ONE GAIN ON ONE SCHEDULE, because that is what a mechanical gearing linkage
           physically is. It reproduces the nose-up pair EXACTLY (35 -> 17.75 deg, ratio 0.507) and
           gives 7.6 deg instead of the documented 5.75 deg nose-down at high q: a single gearing ratio
           cannot produce two different ratios, so the documented pair implies a further asymmetry
           (most likely trim authority) that is [GAP] and is not invented here. [ABL]

           The schedule VARIABLE is [SET]: q, as spec §7.2 suggests. Whether the real unit schedules on
           q, IAS or Mach is [GAP]. Breakpoints: full gearing up to 135 psf (~200 kt at sea level, the
           approach/pattern band), fully geared down by 550 psf (~400 kt). Transition shape [SET]. -->
      <!-- Stick plus trim, BEFORE the gearing. This summer is not cosmetic: JSBSim's longitudinal trim
           routine zeroes qdot by driving fcs/pitch-trim-cmd-norm (FGTrimAxis, tQdot/tPitchTrim), never
           the stick, so a pitch channel that ignores the trim input cannot be trimmed AT ALL — FGTrim
           reports "qdot doesn't appear to be trimmable" because its control has no effect on the state
           it is solving for. The pinned F-16 deck sums the same two inputs for the same reason.
           Summing BEFORE the ARU is also the physical order: on a mechanically-signalled aircraft the
           trim moves the same linkage the stick does, so it is geared down with it. -->
      <summer name="fcs/pitch-stick-plus-trim">
        <input>fcs/elevator-cmd-norm</input>
        <input>fcs/pitch-trim-cmd-norm</input>
        <clipto> <min>-1.0</min> <max>1.0</max> </clipto>
      </summer>

      <scheduled_gain name="fcs/aru-geared-cmd">
        <input>fcs/pitch-stick-plus-trim</input>
        <table>
          <independentVar>aero/qbar-psf</independentVar>
          <tableData>
              0.0   1.000
            135.0   1.000
            300.0   0.720
            550.0   0.507
           4000.0   0.507
          </tableData>
        </table>
        <clipto> <min>-1.0</min> <max>1.0</max> </clipto>
      </scheduled_gain>

      <!-- Stabilator actuator [SET]: 2.0 /s on the normalised command = full travel in 1 s ~ 50 deg/s
           of surface. Actuator rates are [GAP] at every tier (spec §12.1). -->
      <actuator name="fcs/elevator-actuator">
        <input>fcs/aru-geared-cmd</input>
        <rate_limit> 2.0 </rate_limit>
        <clipto> <min>-1.0</min> <max>1.0</max> </clipto>
      </actuator>

      <!-- Sign: JSBSim's positive elevator = trailing edge DOWN = nose down, so the documented 35 deg
           of NOSE-UP travel is -0.6109 rad and the 15 deg nose-down is +0.2618 rad. Asymmetric ranges
           are zero-centred by JSBSim's own aerosurface_scale (FGGain::Run), so neutral stays neutral.
           WHICH OF THE PAIR IS UP is [ABL], not stated by the source: an aircraft needs far more
           nose-up authority (rotation, flare, high alpha) than nose-down, so 35 deg is read as the
           nose-up direction. -->
      <aerosurface_scale name="fcs/elevator-pos-rad">
        <input>fcs/elevator-actuator</input>
        <domain> <min>-1.0</min> <max>1.0</max> </domain>
        <range> <min>-0.6109</min> <max>0.2618</max> </range>
        <output>fcs/elevator-pos-rad</output>
      </aerosurface_scale>
    </channel>

    <channel name="Roll">
      <!-- [DCS-FM p.10] ailerons up 25 / down 15 deg, neutral 5 deg UP. The aerodynamics reads ONE
           aileron position, so the up/down asymmetry is folded into Clda rather than carried as two
           surfaces; the 5 deg up neutral is a rigging detail with no aerodynamic consequence at this
           level of modelling and is recorded here rather than modelled.
           The stabilator also rolls (it is "fully rotary, differential" [DCS-FM p.10]) and that
           contribution is likewise inside Clda — the MIXING LAW and the roll/pitch authority split are
           [GAP].
           NOT q-scheduled: the ARU documentation covers the stabilator pair only, so gearing the roll
           axis too would be an invention. [GAP] -->
      <actuator name="fcs/aileron-actuator">
        <input>fcs/aileron-cmd-norm</input>
        <rate_limit> 4.0 </rate_limit>
        <clipto> <min>-1.0</min> <max>1.0</max> </clipto>
      </actuator>
      <aerosurface_scale name="fcs/aileron-pos-rad">
        <input>fcs/aileron-actuator</input>
        <domain> <min>-1.0</min> <max>1.0</max> </domain>
        <range> <min>-0.4363</min> <max>0.4363</max> </range>
        <output>fcs/aileron-pos-rad</output>
      </aerosurface_scale>
    </channel>

    <channel name="Yaw">
      <!-- Rudder travel is [GAP]; +-30 deg [SET] is the ordinary figure for twin fins of this size.
           What is NOT set by taste is the rudder POWER — see Cndr in <aerodynamics>, which is sized
           against the documented asymmetric-thrust case. -->
      <actuator name="fcs/rudder-actuator">
        <input>fcs/rudder-cmd-norm</input>
        <rate_limit> 3.0 </rate_limit>
        <clipto> <min>-1.0</min> <max>1.0</max> </clipto>
      </actuator>
      <aerosurface_scale name="fcs/rudder-pos-rad">
        <input>fcs/rudder-actuator</input>
        <domain> <min>-1.0</min> <max>1.0</max> </domain>
        <range> <min>-0.5236</min> <max>0.5236</max> </range>
        <output>fcs/rudder-pos-rad</output>
      </aerosurface_scale>
    </channel>

    <channel name="Throttle">
      <!-- SAME CONVENTION AS THE PINNED F-16 DECK, deliberately: throttle-pos = 2 x throttle-cmd, so
           0.5 = military and 1.0 = maximum augmentation. FlightBox's controls semantics
           (fdm/FBFdm::SetControls) are then identical across modules and a regulator written against
           one airframe does not silently mean something else on the other.
           TWO ENGINES, ONE LEVER: FlightBox commands a single throttle (fcs/throttle-cmd-norm, which
           is index 0), so the channel FANS IT OUT to both engine positions. Engine-differential
           throttle is not a FlightBox control and no channel produces it. -->
      <pure_gain name="fcs/throttle-left">
        <input>fcs/throttle-cmd-norm</input>
        <gain>2.0</gain>
        <output>fcs/throttle-pos-norm[0]</output>
      </pure_gain>
      <pure_gain name="fcs/throttle-right">
        <input>fcs/throttle-cmd-norm</input>
        <gain>2.0</gain>
        <output>fcs/throttle-pos-norm[1]</output>
      </pure_gain>
    </channel>

    <channel name="Landing Gear">
      <switch name="fcs/gear-wow">
        <default value="0"/>
        <test logic="AND" value="1">
          gear/unit[1]/WOW eq 1
          gear/unit[2]/WOW eq 1
        </test>
      </switch>
      <!-- Transit time [SET] 6 s. [DCS-EA p.77] documents the PROCEDURE around it (retract at
           32-50 ft AGL; if not up, 80 % RPM and 220 kts to recheck) but not the duration. -->
      <kinematic name="fcs/gear-control">
        <input>gear/gear-cmd-norm</input>
        <traverse>
          <setting> <position>0</position> <time>0</time> </setting>
          <setting> <position>1</position> <time>6</time> </setting>
        </traverse>
        <output>gear/gear-pos-norm</output>
      </kinematic>
      <!-- Nose-wheel steering: the +-30 deg hardware limit is on the contact; this schedule is the
           documented OPERATING split — full authority for taxi, +-8 deg for the takeoff roll
           [DCS-FM p.10]. 8/30 = 0.267 of the stop, reached by ~60 kt of groundspeed [SET shape]. -->
      <scheduled_gain name="fcs/steer-pos-deg">
        <input>fcs/steer-cmd-norm</input>
        <table>
          <independentVar>velocities/vg-fps</independentVar>
          <tableData>
             10.0  30.0
            100.0   8.0
            200.0   2.0
          </tableData>
        </table>
        <output>fcs/steer-pos-deg</output>
      </scheduled_gain>
    </channel>

    <channel name="Flaps">
      <!-- [DCS-FM p.10] single-slotted, 25 deg = 0.4363 rad. [DCS-EA p.57] three buttons
           RETRACTED / TAKEOFF / LANDING, and "the flaps and slats extract both" on either DOWN button
           — so the flap command also drives the slats (see the LEF channel). Transit 5 s [SET]. -->
      <kinematic name="fcs/flap-control">
        <input>fcs/flap-cmd-norm</input>
        <traverse>
          <setting> <position>0</position> <time>0</time> </setting>
          <setting> <position>1</position> <time>5</time> </setting>
        </traverse>
        <output>fcs/flap-pos-norm</output>
      </kinematic>
      <pure_gain name="fcs/flap-pos-rad">
        <input>fcs/flap-pos-norm</input>
        <gain>0.4363</gain>
        <output>fcs/flap-pos-rad</output>
      </pure_gain>
    </channel>

    <channel name="Leading Edge Flap">
      <!-- [DCS-FM p.10] three-section, 20 deg = 0.3491 rad, AUTO-EXTEND above alpha = 8.7 deg
           (0.1518 rad). [DCS-EA p.57] after gear retraction "the slats become fully automatic and
           operate depending on the angle of attack and the Mach number".
           Modelled as: full extension with the flaps (documented coupling), otherwise a linear
           alpha ramp from 8.7 deg to 15 deg [SET shape — only the threshold is documented], faded out
           supersonically because that is what "and the Mach number" can only mean for a slat. -->
      <fcs_function name="fcs/lef-alpha-demand">
        <function>
          <max>
            <property>fcs/flap-pos-norm</property>
            <min>
              <value>1.0</value>
              <max>
                <value>0.0</value>
                <quotient>
                  <difference>
                    <property>aero/alpha-rad</property>
                    <value>0.1518</value>
                  </difference>
                  <value>0.1100</value>
                </quotient>
              </max>
            </min>
          </max>
        </function>
      </fcs_function>
      <scheduled_gain name="fcs/lef-demand">
        <input>fcs/lef-alpha-demand</input>
        <table>
          <independentVar>velocities/mach</independentVar>
          <tableData>
            0.00  1.00
            0.85  1.00
            1.10  0.00
            3.00  0.00
          </tableData>
        </table>
      </scheduled_gain>
      <kinematic name="fcs/lef-control">
        <input>fcs/lef-demand</input>
        <traverse>
          <setting> <position>0</position> <time>0</time> </setting>
          <setting> <position>1</position> <time>3</time> </setting>
        </traverse>
        <output>fcs/lef-pos-norm</output>
      </kinematic>
      <pure_gain name="fcs/lef-pos-rad">
        <input>fcs/lef-pos-norm</input>
        <gain>0.3491</gain>
        <output>fcs/lef-pos-rad</output>
      </pure_gain>
    </channel>

    <channel name="Speedbrake">
      <!-- [DCS-FM p.10] upper 0.75 m^2 at +56 deg, lower 0.55 m^2 at -60 deg. [DCS-EA p.57]:
           spring-loaded switch that auto-returns to IN, full extension ~3 s, BLOW-BACK RETRACTION
           above 540 kts, INHIBITED with the centreline tank or gear down, auto-retract on total
           electrical failure. Three of those five are modelled here (extension time, blow-back,
           gear-down inhibit); the centreline-tank inhibit is a stores state that belongs to the
           module, and the electrical case needs an electrical system this deck does not have. -->
      <switch name="fcs/speedbrake-permitted">
        <default value="1"/>
        <test logic="AND" value="0">
          gear/gear-pos-norm gt 0.05
        </test>
      </switch>
      <scheduled_gain name="fcs/speedbrake-blowback">
        <input>fcs/speedbrake-cmd-norm</input>
        <table>
          <independentVar>velocities/vc-kts</independentVar>
          <tableData>
              0.0  1.00
            520.0  1.00
            560.0  0.00
           1200.0  0.00
          </tableData>
        </table>
      </scheduled_gain>
      <fcs_function name="fcs/speedbrake-demand">
        <function>
          <product>
            <property>fcs/speedbrake-blowback</property>
            <property>fcs/speedbrake-permitted</property>
          </product>
        </function>
      </fcs_function>
      <kinematic name="fcs/speedbrake-control">
        <input>fcs/speedbrake-demand</input>
        <traverse>
          <setting> <position>0</position> <time>0</time> </setting>
          <setting> <position>1</position> <time>3</time> </setting>
        </traverse>
        <output>fcs/speedbrake-pos-norm</output>
      </kinematic>
    </channel>

    <channel name="Drag Chute">
      <!-- [DCS-EA p.60] the chute separates above 175 kts, and is mandatory for a wet runway, a short
           field, a landing immediately after takeoff, a no-slat landing, and an aborted takeoff after
           nose-wheel lift.
           [SET] — AND THIS IS THE ONE PLACE THE DECK STANDS IN FOR A MISSING CLIENT CHANNEL, so it is
           flagged rather than buried: deploying the chute is a PILOT ACTION, and systems/
           FBAirframeControls carries no chute command yet (that is stage 2 work). Until it does, the
           deck arms the chute on the documented CONDITIONS — weight on wheels, gear down, below the
           documented 175 kt separation speed — and releases it above 175 kt, which is documented. The
           consequence to know: every rollout in this model is a chute rollout, so the no-chute landing
           distance is not measurable until the client channel exists.
           Inflation lag 1.2 s [SET]. -->
      <switch name="fcs/chute-armed">
        <default value="0"/>
        <test logic="AND" value="1">
          fcs/gear-wow eq 1
          gear/gear-pos-norm gt 0.9
          velocities/vc-kts lt 175
        </test>
      </switch>
      <kinematic name="fcs/chute-control">
        <input>fcs/chute-armed</input>
        <traverse>
          <setting> <position>0</position> <time>0</time> </setting>
          <setting> <position>1</position> <time>1.2</time> </setting>
        </traverse>
        <output>fcs/chute-pos-norm</output>
      </kinematic>
    </channel>

  </flight_control>

  <!-- ============================== 6. AERODYNAMICS (spec §6) ==============================
       Reference quantities: S = 409.6 ft^2, b = 37.27 ft, cbar = 10.99 ft, AR = b^2/S = 3.391.
       Every <function> is a <product> that already contains qbar and the reference area (and span or
       chord for a moment), so these functions produce FORCES (lbf) and MOMENTS (lbf*ft), not
       coefficients — the JSBSim convention the pinned F-16 deck also follows.
       Alpha breakpoints are -10..+45 deg in 5 deg steps (in radians), the F-16 deck's grid, PLUS a
       +-2.5 deg pair on the three tables that are nonlinear through zero (lift, lift-dependent drag,
       pitching moment). That extra pair is not decoration: JSBSim interpolates a table LINEARLY, and a
       quadratic drag rise sampled first at 5 deg is overstated by a factor of ~4.5 at the 1 deg
       incidence a fighter actually cruises and dashes at. Before the pair existed the model levelled
       off at M 2.07 against a documented M 2.3 for that reason alone.
       JSBSim CLAMPS at the end points rather than extrapolating, so past 45 deg every table holds its
       45 deg value: this model has no deep-stall region and does not pretend to. -->
  <aerodynamics>

    <!-- GROUND EFFECT [ANALOGY]. The lift increment near the ground, as a factor on every lift term.
         The curve is the pinned F-16 deck's kCLge table, which that model sources from NASA H-1999 and
         H-2177 — i.e. it is a real measured ground-effect shape, but of OTHER aircraft. It is applied
         against h/b, and the MiG-29's span is 24 % larger, so the same table already stretches the
         effect over the correspondingly greater height by construction.
         Like the F-16 deck, ONLY LIFT is ground-effected here; drag and pitching moment are not. -->
    <function name="aero/function/kCLge">
      <description>Change in lift due to ground effect</description>
      <table>
        <independentVar>aero/h_b-mac-ft</independentVar>
        <tableData>
          0.0000  1.2290
          0.1000  1.1240
          0.1500  1.1160
          0.2000  1.1240
          0.3000  1.1050
          0.4000  1.0410
          0.5000  1.0340
          0.6000  1.0190
          0.7000  1.0080
          0.8000  1.0030
          0.9000  1.0010
          1.0000  1.0000
          1.1000  1.0000
        </tableData>
      </table>
    </function>

    <!-- COMPRESSIBILITY FACTOR ON LIFT [GEO]. Linear theory: subsonic Prandtl-Glauert growth to the
         transonic peak, then the supersonic 4/sqrt(M^2-1) decay limited by the finite aspect ratio
         (at AR 3.39 the low-speed CLalpha is 3.37/rad and the M2 value works out near 2.3/rad, i.e.
         a factor of ~0.70). Applied to the whole lift curve including the vortex term, which is an
         approximation and is stated as one. -->
    <function name="aero/function/kCLmach">
      <description>Lift-curve compressibility factor</description>
      <table>
        <independentVar>velocities/mach</independentVar>
        <tableData>
          0.00  1.00
          0.85  1.10
          0.95  1.20
          1.05  1.25
          1.20  1.15
          1.60  0.85
          2.00  0.70
          2.40  0.60
        </tableData>
      </table>
    </function>

    <axis name="LIFT">
      <!-- THE BASIC LIFT CURVE. Construction, so it can be checked rather than believed
           [GEO + ANALOGY]:
             CL(alpha) = Kp*sin(a)*cos^2(a)  +  Kv*sin^2(a)*cos(a)*burst(a)
           the Polhamus leading-edge-suction analogy — a potential term plus a VORTEX term, which is
           the right decomposition for this planform and the reason an F-16 analogy would have been
           the wrong one.
             Kp = 3.37 /rad [GEO]: DATCOM/lifting-line for AR 3.391 with mid-chord sweep 27.9 deg
               (tan L_c/2 = (tan42 + tan9)/2 from the documented 42 deg LE and ~9 deg TE sweep):
               CLa = 2*pi*A / (2 + sqrt(A^2*(1+tan^2 L_c/2) + 4)) = 21.31/6.327 = 3.368.
             Kv = 1.6 [ANALOGY]: the LERX vortex-lift increment, scaled to a LERX that is 12.4 % of the
               reference area (4.71/38.056 [DCS-FM p.9]) sweeping at 73 deg 30'. This is the
               coefficient that DEFINES the MiG-29 and it is [GAP] in every public MiG source.
             burst(a) [ANALOGY]: 1.0 to 30 deg, then 0.87 / 0.73 / 0.60 at 35 / 40 / 45 deg — vortex
               breakdown moving forward over the wing. This is where the HARV database is doing the
               work; without it lift would keep growing to 45 deg, which no LEX aircraft does.

           THE INVERTED CROSS-CHECK, which is what makes the curve more than a construction [INV]:
           [DCS-EA p.79] touchdown at 140 kts and 11 deg AoA with flaps 25 and slats 20. At an assumed
           12,000 kg landing weight, CL = 2W/(rho V^2 S) = 2*117,720/(1.225*72.02^2*38.056) = 0.97.
           This table gives CL(11 deg) = 0.675 clean, and the high-lift terms below add 0.32, for
           0.995 — a 2.6 % miss on the single hardest aerodynamic number in the model. -->
      <function name="aero/coefficient/CLalpha">
        <description>Lift due to alpha</description>
        <product>
          <property>aero/qbar-psf</property>
          <property>metrics/Sw-sqft</property>
          <property>aero/function/kCLge</property>
          <property>aero/function/kCLmach</property>
          <table>
            <independentVar>aero/alpha-rad</independentVar>
            <tableData>
              -0.1745  -0.6149
              -0.0873  -0.3038
              -0.0436  -0.1498
               0.0000   0.0000
               0.0436   0.1498
               0.0873   0.3038
               0.1745   0.6149
               0.2618   0.9172
               0.3491   1.1937
               0.4363   1.4287
               0.5236   1.6102
               0.6109   1.6722
               0.6981   1.6410
               0.7854   1.5308
            </tableData>
          </table>
        </product>
      </function>

      <!-- [GEO] CLde = (S_h/S) * CLa_h * eta = (75.88/409.6) * 2.4 * 0.9 = 0.400 /rad, with CLa_h 2.4
           for an all-moving surface of AR ~2.5 and tail efficiency eta = 0.9 [SET]. -->
      <function name="aero/coefficient/CLde">
        <description>Lift due to stabilator</description>
        <product>
          <property>aero/qbar-psf</property>
          <property>metrics/Sw-sqft</property>
          <property>aero/function/kCLge</property>
          <property>fcs/elevator-pos-rad</property>
          <value> 0.400 </value>
        </product>
      </function>

      <!-- THE HIGH-LIFT SPLIT [INV total, SET split]. The touchdown anchor above constrains the SUM of
           the two increments to 0.32 at 25 deg flap + 20 deg slat. The split between them is set, not
           derived: 0.25 to the single-slotted flap (2.84 m^2, 7.5 % of the reference area) and 0.07 to
           the slats, because a leading-edge device mostly extends the usable alpha rather than raising
           CL at a fixed one.
             flaps: 0.25 / 0.4363 rad = 0.573 /rad
             slats: 0.07 / 0.3491 rad = 0.200 /rad -->
      <function name="aero/coefficient/CLflaps">
        <description>Lift due to trailing-edge flaps</description>
        <product>
          <property>aero/qbar-psf</property>
          <property>metrics/Sw-sqft</property>
          <property>aero/function/kCLge</property>
          <property>fcs/flap-pos-rad</property>
          <value> 0.573 </value>
        </product>
      </function>
      <function name="aero/coefficient/CLlef">
        <description>Lift due to leading-edge flaps (slats)</description>
        <product>
          <property>aero/qbar-psf</property>
          <property>metrics/Sw-sqft</property>
          <property>aero/function/kCLge</property>
          <property>fcs/lef-pos-rad</property>
          <value> 0.200 </value>
        </product>
      </function>

      <!-- [GEO] CLq ~ 2*eta*CLa_h*V_H = 2*0.9*2.4*0.2875 = 1.24 from the tail, plus ~2 from the wing
           = 3.2 /rad. V_H = (S_h*l_h)/(S*cbar) = (75.88*17.06)/(409.6*10.99) = 0.2875. -->
      <function name="aero/coefficient/CLq">
        <description>Lift due to pitch rate</description>
        <product>
          <property>aero/qbar-psf</property>
          <property>metrics/Sw-sqft</property>
          <property>aero/ci2vel</property>
          <property>velocities/q-aero-rad_sec</property>
          <value> 3.2 </value>
        </product>
      </function>
    </axis>

    <axis name="DRAG">
      <!-- ZERO-LIFT DRAG vs MACH — the single most consequential [INV] table in the model, because it
           is where spec §5.4 step 4 puts ALL the residual error of the frozen thrust analogy.

           SUBSONIC LEVEL 0.0215 [INV from the specific-excess-power anchor A4]. Cross-check against
           the resulting glide performance: L/Dmax comes out at 8.9 near alpha 5 deg, which is the
           right order for a clean fighter, and CD(alpha=0) = 0.0215 sits within a percent of the
           pinned F-16 deck's own 0.0210 — two independently built decks agreeing on the flat-plate
           level of a similar aircraft.

           SUPERSONIC LEVELS 0.046 / 0.040 [INV from the two Vmax anchors A2 and A1], solved against
           THIS model's own frozen thrust deck rather than against an assumed ram factor:
             A2, Vmax at sea level 1,500 km/h = M 1.224 [DCS-FM p.14]:
               AugThrust(M1.2, 0 ft) = 1.1254 -> T = 2 * 81.4 kN * 1.1254 = 183 kN
               q = 0.5*1.225*415^2 = 105.5 kPa, qS = 4.014 MN  ->  CD = 183/4014 = 0.0456
             A1, Vmax at 11 km 2,450 km/h = M 2.30 [DCS-FM p.14]:
               AugThrust(M2.3, 36,089 ft) = 0.786 -> T = 2 * 81.4 kN * 0.786 = 128 kN
               q = 0.5*0.3639*678.7^2 = 83.8 kPa, qS = 3.189 MN  ->  CD = 128/3189 = 0.0401
           Induced drag at both conditions is under 0.0005 and is neglected in the inversion.
           SPEC §6.3 SOLVED THE SAME TWO ANCHORS WITH ASSUMED RAM FACTORS AND GOT 0.052 / 0.042; the
           values here differ because the thrust surface is the borrowed F100 one and not the
           assumption. Both numbers and both thrust assumptions are published together, here and in
           engine/RD-33.xml, so a later reader can re-solve the pair with better engine data.
           Transonic rise shape [SET]: the drag-divergence knee at M 0.85 and the peak just past M 1.

           THE SUPERSONIC TAIL IS THE ONE PART FITTED RATHER THAN SOLVED, and this is exactly the
           residual-absorption spec §5.4 step 4 authorises: the closed-form inversion above ignores
           induced and trim drag, which at M 2.3 are small but not zero, so a deck built on 0.0401
           levelled off at M 2.07 in the gym. The M >= 1.6 values are therefore fitted DOWNWARD against
           the A1 measurement itself while M <= 1.22 is left untouched (A2 is measured at M 1.22 and
           must not move). The result — 0.037 at M 2.4 — is the same order as the pinned F-16 deck's
           own supersonic total of 0.036 at M 1.8, so the fit did not have to invent an implausible
           airframe to reach the anchor. -->
      <function name="aero/coefficient/CD0">
        <description>Zero-lift drag vs Mach</description>
        <product>
          <property>aero/qbar-psf</property>
          <property>metrics/Sw-sqft</property>
          <table>
            <independentVar>velocities/mach</independentVar>
            <tableData>
              0.00  0.0215
              0.60  0.0215
              0.85  0.0225
              0.95  0.0330
              1.05  0.0455
              1.22  0.0456
              1.60  0.0415
              2.00  0.0385
              2.40  0.0370
            </tableData>
          </table>
        </product>
      </function>

      <!-- LIFT-DEPENDENT DRAG vs ALPHA [GEO + ANALOGY]. Not a k*CL^2 term, because on a vortex-lift
           wing that is wrong by a factor of three at high alpha: leading-edge suction is progressively
           LOST, and vortex lift carries its full induced-drag penalty.
             CDi(a) = (1-f)*k*CL^2  +  f*CL*tan(a),   f = min(1, (a/30deg)^1.5)
           the attached-flow term with full suction blended into the fully-separated normal-force term.
             k = 1/(pi*AR*e) = 1/(pi*3.391*0.75) = 0.1252 [GEO], Oswald e = 0.75 [SET] — the induced
             term is nominally INV from sustained turn performance, but the only public sustained-turn
             figure is T4 anecdote (spec §8.3), so e stays a declared setting and the measured turn
             rates become the model's own property.
             f [ANALOGY]: the suction-loss schedule is the HARV database's high-alpha drag behaviour.
           CHECK against the pinned F-16 deck, which tabulates total drag directly: at alpha 0 / 10 /
           45 deg this model gives 0.0215 / 0.081 / 1.55 against the F-16's 0.021 / 0.096 / 1.478. -->
      <function name="aero/coefficient/CDalpha">
        <description>Lift-dependent drag vs alpha</description>
        <product>
          <property>aero/qbar-psf</property>
          <property>metrics/Sw-sqft</property>
          <table>
            <independentVar>aero/alpha-rad</independentVar>
            <tableData>
              -0.1745  0.0590
              -0.0873  0.0126
              -0.0436  0.0029
               0.0000  0.0000
               0.0436  0.0029
               0.0873  0.0126
               0.1745  0.0590
               0.2618  0.1550
               0.3491  0.3178
               0.4363  0.5678
               0.5236  0.9295
               0.6109  1.1707
               0.6981  1.3771
               0.7854  1.5308
            </tableData>
          </table>
        </product>
      </function>

      <!-- [SET] trim drag: 0.15 * de^2, i.e. 0.014 at the 17.75 deg in-flight stop. -->
      <function name="aero/coefficient/CDde">
        <description>Drag due to stabilator deflection</description>
        <product>
          <property>aero/qbar-psf</property>
          <property>metrics/Sw-sqft</property>
          <value> 0.15 </value>
          <property>fcs/elevator-pos-rad</property>
          <property>fcs/elevator-pos-rad</property>
        </product>
      </function>

      <!-- [SET] 0.030 fully extended, calibrated against the documented pattern speeds and the
           220 kt gear-check speed [DCS-EA p.77]. The pinned F-16 deck carries 0.027 for a comparable
           tricycle gear [ANALOGY cross-check]. -->
      <function name="aero/coefficient/CDgear">
        <description>Drag due to landing gear</description>
        <product>
          <property>aero/qbar-psf</property>
          <property>metrics/Sw-sqft</property>
          <property>gear/gear-pos-norm</property>
          <value> 0.030 </value>
        </product>
      </function>

      <!-- [SET] 0.138 /rad = 0.060 at the documented 25 deg, the ordinary increment for a single-
           slotted flap covering 7.5 % of the reference area. -->
      <function name="aero/coefficient/CDflaps">
        <description>Drag due to trailing-edge flaps</description>
        <product>
          <property>aero/qbar-psf</property>
          <property>metrics/Sw-sqft</property>
          <property>fcs/flap-pos-rad</property>
          <value> 0.138 </value>
        </product>
      </function>
      <!-- [SET] 0.020 /rad = 0.007 at 20 deg. A slat is a low-drag device by design. -->
      <function name="aero/coefficient/CDlef">
        <description>Drag due to leading-edge flaps</description>
        <product>
          <property>aero/qbar-psf</property>
          <property>metrics/Sw-sqft</property>
          <property>fcs/lef-pos-rad</property>
          <value> 0.020 </value>
        </product>
      </function>

      <!-- [DERIVED] speedbrakes, from the documented areas and deflections [DCS-FM p.10]:
           projected area = 0.75*sin(56) + 0.55*sin(60) = 1.10 m^2; flat-plate Cd 1.2 gives
           dCdA = 1.32 m^2, over the 38.056 m^2 reference area that is dCD = 0.0347. -->
      <function name="aero/coefficient/CDsb">
        <description>Drag due to speedbrakes</description>
        <product>
          <property>aero/qbar-psf</property>
          <property>metrics/Sw-sqft</property>
          <property>fcs/speedbrake-pos-norm</property>
          <value> 0.0347 </value>
        </product>
      </function>

      <!-- DRAG CHUTE [SET], the free parameter of build step 5 and therefore calibrated LAST so it
           cannot mask airframe drag. CdA = 12 m^2 (a ~17 m^2 ribbon canopy at Cd 0.7), which over the
           reference area is dCD = 12/38.056 = 0.315 [DERIVED]. Calibrated against the documented
           600 m landing roll with chute (anchor B9).
           Applied on the DRAG axis at the aerodynamic reference point rather than as an
           <external_reactions> force at the tail attachment: the force is the same, the pitching
           couple of the real attachment point (nose-down, small at rollout speeds) is not modelled,
           and saying so is cheaper than a moment nobody can source. -->
      <function name="aero/coefficient/CDchute">
        <description>Drag due to the brake chute</description>
        <product>
          <property>aero/qbar-psf</property>
          <property>metrics/Sw-sqft</property>
          <property>fcs/chute-pos-norm</property>
          <value> 0.315 </value>
        </product>
      </function>
    </axis>

    <axis name="SIDE">
      <!-- [GEO] CYbeta = -(eta*(S_v/S)*CLa_v + fuselage) = -(0.9*(118.4/409.6)*2.8 + 0.17) = -0.90
           /rad, with CLa_v = 2.8 for a fin of this aspect ratio. -->
      <function name="aero/coefficient/CYb">
        <description>Side force due to sideslip</description>
        <product>
          <property>aero/qbar-psf</property>
          <property>metrics/Sw-sqft</property>
          <property>aero/beta-rad</property>
          <value> -0.90 </value>
        </product>
      </function>
      <!-- [GEO] tied to Cndr by the fin arm so the two cannot drift apart:
           CYdr = -Cndr * b/l_v = 0.090 * 37.27/16.40 = 0.205 /rad. -->
      <function name="aero/coefficient/CYdr">
        <description>Side force due to rudder</description>
        <product>
          <property>aero/qbar-psf</property>
          <property>metrics/Sw-sqft</property>
          <property>fcs/rudder-pos-rad</property>
          <value> 0.205 </value>
        </product>
      </function>
    </axis>

    <axis name="ROLL">
      <!-- DIHEDRAL EFFECT [GEO + ANALOGY]. Two contributions with opposite signs: 42 deg of sweep
           makes Clbeta proportional to CL and strongly stabilising as alpha rises, while the
           documented -3 deg of anhedral [DCS-FM p.9] deliberately takes some of that back (which is
           exactly why the anhedral is there on a high-wing swept fighter). At high alpha the LERX
           vortices dominate and the curve rolls off [ANALOGY]. -->
      <function name="aero/coefficient/Clb">
        <description>Roll moment due to sideslip</description>
        <product>
          <property>aero/qbar-psf</property>
          <property>metrics/Sw-sqft</property>
          <property>metrics/bw-ft</property>
          <property>aero/beta-rad</property>
          <table>
            <independentVar>aero/alpha-rad</independentVar>
            <tableData>
              -0.1745   0.030
              -0.0873   0.000
               0.0000  -0.030
               0.0873  -0.075
               0.1745  -0.090
               0.2618  -0.130
               0.3491  -0.160
               0.4363  -0.185
               0.5236  -0.200
               0.6109  -0.190
               0.6981  -0.155
               0.7854  -0.120
            </tableData>
          </table>
        </product>
      </function>

      <!-- ROLL DAMPING [GEO + ANALOGY]. -0.40 /rad at low alpha from the standard strip estimate for
           AR 3.391 with this taper and sweep; the decay above 20 deg is the HARV shape (an outboard
           wing that is already separated damps far less). -->
      <function name="aero/coefficient/Clp">
        <description>Roll moment due to roll rate</description>
        <product>
          <property>aero/qbar-psf</property>
          <property>metrics/Sw-sqft</property>
          <property>metrics/bw-ft</property>
          <property>aero/bi2vel</property>
          <property>velocities/p-aero-rad_sec</property>
          <table>
            <independentVar>aero/alpha-rad</independentVar>
            <tableData>
              -0.1745  -0.380
              -0.0873  -0.395
               0.0000  -0.400
               0.0873  -0.395
               0.1745  -0.380
               0.2618  -0.355
               0.3491  -0.320
               0.4363  -0.280
               0.5236  -0.240
               0.6109  -0.195
               0.6981  -0.150
               0.7854  -0.120
            </tableData>
          </table>
        </product>
      </function>

      <!-- [GEO] Clr ~ CL/4 for a swept wing, hence the alpha dependence; the roll-off past 30 deg is
           [ANALOGY]. -->
      <function name="aero/coefficient/Clr">
        <description>Roll moment due to yaw rate</description>
        <product>
          <property>aero/qbar-psf</property>
          <property>metrics/Sw-sqft</property>
          <property>metrics/bw-ft</property>
          <property>aero/bi2vel</property>
          <property>velocities/r-aero-rad_sec</property>
          <table>
            <independentVar>aero/alpha-rad</independentVar>
            <tableData>
              -0.1745  -0.150
              -0.0873  -0.075
               0.0000   0.020
               0.0873   0.085
               0.1745   0.150
               0.2618   0.230
               0.3491   0.300
               0.4363   0.335
               0.5236   0.350
               0.6109   0.290
               0.6981   0.200
               0.7854   0.100
            </tableData>
          </table>
        </product>
      </function>

      <!-- ROLL CONTROL POWER [SET] — one of the two stacked settings on this axis (Ixx is the other),
           and the axis has NO measurement to separate them: roll rate is [GAP] at every confidence
           tier (spec §8.3). 0.085 /rad at low alpha is the SUM of two documented surfaces whose split
           is not documented: ailerons of 1.45 m^2 each at up 25 / down 15 deg, and the differential
           deflection of a 7.05 m^2 all-moving stabilator [DCS-FM p.10]. The alpha decay is [ANALOGY].
           WHAT THIS MEANS FOR THE MODEL: the roll rate this deck produces is a MEASURED PROPERTY OF
           THE MODEL and nothing more — it is not a claim about the aircraft, and it is recorded as
           such in doc/mig29/flight-model-spec.md rather than presented as fidelity. -->
      <function name="aero/coefficient/Clda">
        <description>Roll moment due to ailerons and differential stabilator</description>
        <product>
          <property>aero/qbar-psf</property>
          <property>metrics/Sw-sqft</property>
          <property>metrics/bw-ft</property>
          <property>fcs/aileron-pos-rad</property>
          <table>
            <independentVar>aero/alpha-rad</independentVar>
            <tableData>
              -0.1745  0.0850
              -0.0873  0.0850
               0.0000  0.0850
               0.0873  0.0850
               0.1745  0.0820
               0.2618  0.0760
               0.3491  0.0680
               0.4363  0.0580
               0.5236  0.0470
               0.6109  0.0380
               0.6981  0.0310
               0.7854  0.0255
            </tableData>
          </table>
        </product>
      </function>

      <!-- [GEO] the fins sit above the CG, so rudder deflection rolls the aircraft:
           Cldr = -Cndr * z_v/l_v ~ 0.090 * 0.13 = 0.012 /rad. -->
      <function name="aero/coefficient/Cldr">
        <description>Roll moment due to rudder</description>
        <product>
          <property>aero/qbar-psf</property>
          <property>metrics/Sw-sqft</property>
          <property>metrics/bw-ft</property>
          <property>fcs/rudder-pos-rad</property>
          <value> 0.012 </value>
        </product>
      </function>
    </axis>

    <axis name="PITCH">
      <!-- THE PITCHING MOMENT. Two superposed parts, and the split is the honest one:

           PART 1, alpha 0-20 deg [SET static margin, GEO shape]: Cm = -0.05 * CL(alpha). The MiG-29 is
           statically STABLE — it has a mechanical control system with a gearing changer and a damper,
           not relaxed-stability fly-by-wire, and that is a qualitative certainty from the control
           architecture [ABL]. The MARGIN is [GAP] at every tier, so 5 % of cbar is a declared setting;
           it makes dCm/dalpha = -0.174 /rad at alpha 0 against CLalpha = 3.48 /rad there.
           Because AERORP sits on the design CG, this table IS the moment about that point and the
           static margin is exactly what it says.

           PART 2, above 20 deg [ANALOGY]: a nose-up increment growing to +0.13 at 45 deg — the LERX
           vortex lift acting ahead of the CG. This is the HARV database's pitch-up, and it puts the
           model's static stability boundary at alpha ~38 deg. IT LIES ENTIRELY BEYOND THE 26 deg
           LIMITER, which is exactly the region the spec requires to be declared as analogy: this deck
           does not predict MiG-29 departure behaviour, it behaves like the aircraft it borrowed from. -->
      <function name="aero/coefficient/Cm">
        <description>Pitch moment due to alpha</description>
        <product>
          <property>aero/qbar-psf</property>
          <property>metrics/Sw-sqft</property>
          <property>metrics/cbarw-ft</property>
          <table>
            <independentVar>aero/alpha-rad</independentVar>
            <tableData>
              -0.1745   0.0307
              -0.0873   0.0152
              -0.0436   0.0075
               0.0000   0.0000
               0.0436  -0.0075
               0.0873  -0.0152
               0.1745  -0.0307
               0.2618  -0.0459
               0.3491  -0.0597
               0.4363  -0.0594
               0.5236  -0.0505
               0.6109  -0.0286
               0.6981   0.0079
               0.7854   0.0535
            </tableData>
          </table>
        </product>
      </function>

      <!-- MACH TUCK [GEO]. The aerodynamic centre moves ~10 % of cbar aft through the transonic, so
           dCmalpha = -0.10 * CLalpha = -0.34 /rad, applied as a Mach-scheduled increment on alpha.
           This is the aft AC shift, not a separate phenomenon; the shape [ANALOGY]. -->
      <function name="aero/coefficient/Cm_mach">
        <description>Pitch moment, compressibility (aft AC shift)</description>
        <product>
          <property>aero/qbar-psf</property>
          <property>metrics/Sw-sqft</property>
          <property>metrics/cbarw-ft</property>
          <property>aero/alpha-rad</property>
          <table>
            <independentVar>velocities/mach</independentVar>
            <tableData>
              0.00   0.00
              0.85   0.00
              0.95  -0.20
              1.05  -0.34
              2.40  -0.34
            </tableData>
          </table>
        </product>
      </function>

      <!-- [GEO] Cmde = -V_H * CLa_h * eta = -0.2875 * 2.4 * 0.9 = -0.621 /rad, using the same tail
           volume, lift slope and efficiency as CLde. The check that this is enough control power: at
           the documented in-flight nose-up stop (17.75 deg = 0.3098 rad) it produces dCm = 0.192,
           which is the same order as the pinned F-16 deck's 0.186 at its own 25 deg stop. -->
      <function name="aero/coefficient/Cmde">
        <description>Pitch moment due to stabilator</description>
        <product>
          <property>aero/qbar-psf</property>
          <property>metrics/Sw-sqft</property>
          <property>metrics/cbarw-ft</property>
          <property>fcs/elevator-pos-rad</property>
          <value> -0.621 </value>
        </product>
      </function>

      <!-- [SET] flaps and slats pitch the nose down; gear does too. Magnitudes are settings, the signs
           are not. Speedbrakes are modelled as moment-NEUTRAL: the upper (0.75 m^2, +56 deg) and lower
           (0.55 m^2, -60 deg) surfaces are a deliberately opposed pair, and no source gives a residual. -->
      <function name="aero/coefficient/Cmflaps">
        <description>Pitch moment due to flaps</description>
        <product>
          <property>aero/qbar-psf</property>
          <property>metrics/Sw-sqft</property>
          <property>metrics/cbarw-ft</property>
          <property>fcs/flap-pos-rad</property>
          <value> -0.120 </value>
        </product>
      </function>
      <function name="aero/coefficient/Cmlef">
        <description>Pitch moment due to slats</description>
        <product>
          <property>aero/qbar-psf</property>
          <property>metrics/Sw-sqft</property>
          <property>metrics/cbarw-ft</property>
          <property>fcs/lef-pos-rad</property>
          <value> -0.030 </value>
        </product>
      </function>
      <function name="aero/coefficient/Cmgear">
        <description>Pitch moment due to landing gear</description>
        <product>
          <property>aero/qbar-psf</property>
          <property>metrics/Sw-sqft</property>
          <property>metrics/cbarw-ft</property>
          <property>gear/gear-pos-norm</property>
          <value> -0.015 </value>
        </product>
      </function>

      <!-- [GEO] Cmq = -2*CLa_h*eta*V_H*(l_h/cbar) = -2*2.4*0.9*0.2875*1.552 = -1.93 from the tail;
           the wing/body contributes about the same again on a low-AR planform, so -4.0 total [SET for
           the wing half]. -->
      <function name="aero/coefficient/Cmq">
        <description>Pitch moment due to pitch rate</description>
        <product>
          <property>aero/qbar-psf</property>
          <property>metrics/Sw-sqft</property>
          <property>metrics/cbarw-ft</property>
          <property>aero/ci2vel</property>
          <property>velocities/q-aero-rad_sec</property>
          <value> -4.0 </value>
        </product>
      </function>

      <!-- [GEO] Cmadot = Cmq_tail * (deps/dalpha) = -1.93 * 0.35 = -0.68, rounded to -0.70. INCLUDED
           DELIBERATELY: doc/f16/flight-model.md §12.1 records that the pinned F-16 deck OMITS Cmadot
           while the Mk-82 deck has one, and spec §6.5 asks for this deck to include it or state its
           absence. It is included. -->
      <function name="aero/coefficient/Cmadot">
        <description>Pitch moment due to alpha rate (downwash lag)</description>
        <product>
          <property>aero/qbar-psf</property>
          <property>metrics/Sw-sqft</property>
          <property>metrics/cbarw-ft</property>
          <property>aero/ci2vel</property>
          <property>aero/alphadot-rad_sec</property>
          <value> -0.70 </value>
        </product>
      </function>
    </axis>

    <axis name="YAW">
      <!-- WEATHERCOCK STABILITY [GEO + ANALOGY]. At low alpha:
             Cnbeta = eta*V_v*CLa_v - fuselage = 0.9*0.1272*2.8 - 0.12 = +0.20 /rad,
           with V_v = (S_v*l_v)/(S*b) = (118.4*16.40)/(409.6*37.27) = 0.1272 and a forebody decrement
           typical of a long-nosed fighter. The SIGN CHANGE above ~33 deg is [ANALOGY] — the twin fins
           enter the LERX vortex wake and the forebody takes over — and it is the model's departure
           boundary, in the region the analogy explicitly covers and the aircraft's own data does not. -->
      <function name="aero/coefficient/Cnb">
        <description>Yaw moment due to sideslip</description>
        <product>
          <property>aero/qbar-psf</property>
          <property>metrics/Sw-sqft</property>
          <property>metrics/bw-ft</property>
          <property>aero/beta-rad</property>
          <table>
            <independentVar>aero/alpha-rad</independentVar>
            <tableData>
              -0.1745   0.200
              -0.0873   0.200
               0.0000   0.200
               0.0873   0.190
               0.1745   0.180
               0.2618   0.160
               0.3491   0.120
               0.4363   0.075
               0.5236   0.030
               0.6109  -0.025
               0.6981  -0.060
               0.7854  -0.080
            </tableData>
          </table>
        </product>
      </function>

      <!-- [GEO] Cnr = -2*eta*(S_v*l_v^2)/(S*b^2)*CLa_v - profile
           = -2*0.9*(118.4*16.40^2)/(409.6*37.27^2)*2.8 - 0.05 = -0.33 /rad; decaying with alpha
           [ANALOGY] as the fins unload. -->
      <function name="aero/coefficient/Cnr">
        <description>Yaw moment due to yaw rate</description>
        <product>
          <property>aero/qbar-psf</property>
          <property>metrics/Sw-sqft</property>
          <property>metrics/bw-ft</property>
          <property>aero/bi2vel</property>
          <property>velocities/r-aero-rad_sec</property>
          <table>
            <independentVar>aero/alpha-rad</independentVar>
            <tableData>
              -0.1745  -0.330
              -0.0873  -0.330
               0.0000  -0.330
               0.0873  -0.325
               0.1745  -0.315
               0.2618  -0.300
               0.3491  -0.280
               0.4363  -0.255
               0.5236  -0.230
               0.6109  -0.210
               0.6981  -0.200
               0.7854  -0.200
            </tableData>
          </table>
        </product>
      </function>

      <!-- [GEO] Cnp ~ -CL/8 for a swept wing. -->
      <function name="aero/coefficient/Cnp">
        <description>Yaw moment due to roll rate</description>
        <product>
          <property>aero/qbar-psf</property>
          <property>metrics/Sw-sqft</property>
          <property>metrics/bw-ft</property>
          <property>aero/bi2vel</property>
          <property>velocities/p-aero-rad_sec</property>
          <table>
            <independentVar>aero/alpha-rad</independentVar>
            <tableData>
              -0.1745   0.075
              -0.0873   0.040
               0.0000  -0.020
               0.0873  -0.040
               0.1745  -0.060
               0.2618  -0.080
               0.3491  -0.100
               0.4363  -0.120
               0.5236  -0.140
               0.6109  -0.160
               0.6981  -0.175
               0.7854  -0.180
            </tableData>
          </table>
        </product>
      </function>

      <!-- RUDDER POWER [GEO + INV]. The simple fin estimate
           (Cndr = -eta*V_v*CLa_v*tau = -0.9*0.1272*2.8*0.48 = -0.154) overstates real rudder power —
           the pinned F-16 deck's own tabulated Cndr is about half of the same estimate for its fin
           [ABL] — so the same halving is applied: Cndr = -0.090 /rad.
           THE INVERSION THAT VALIDATES IT [INV]: the documented asymmetric-thrust case. One engine at
           full augmentation with the other out is 81.4 kN at 0.75 m = 61 kN*m of yaw. At 90 m/s
           (approach speed) with 25 deg of rudder, this coefficient produces
           0.090*0.4363 * q*S*b = 0.0393 * 2.145 MN*m = 84 kN*m [DERIVED] — trimmable with margin,
           which is the requirement. Full 30 deg would give 101 kN*m. -->
      <function name="aero/coefficient/Cndr">
        <description>Yaw moment due to rudder</description>
        <product>
          <property>aero/qbar-psf</property>
          <property>metrics/Sw-sqft</property>
          <property>metrics/bw-ft</property>
          <property>fcs/rudder-pos-rad</property>
          <value> -0.090 </value>
        </product>
      </function>

      <!-- ADVERSE YAW [ANALOGY]. Positive (adverse) at low alpha, crossing to proverse above ~25 deg,
           the shape the F-16 deck also shows and the HARV database confirms for a LEX aircraft.
           Whether the real aircraft has an aileron-rudder interconnect that would mask this is [GAP]
           and none is modelled. -->
      <function name="aero/coefficient/Cnda">
        <description>Yaw moment due to ailerons</description>
        <product>
          <property>aero/qbar-psf</property>
          <property>metrics/Sw-sqft</property>
          <property>metrics/bw-ft</property>
          <property>fcs/aileron-pos-rad</property>
          <table>
            <independentVar>aero/alpha-rad</independentVar>
            <tableData>
              -0.1745   0.010
              -0.0873   0.010
               0.0000   0.008
               0.0873   0.006
               0.1745   0.004
               0.2618   0.001
               0.3491  -0.003
               0.4363  -0.008
               0.5236  -0.012
               0.6109  -0.016
               0.6981  -0.018
               0.7854  -0.020
            </tableData>
          </table>
        </product>
      </function>
    </axis>

  </aerodynamics>

</fdm_config>
