<?xml version="1.0"?>
<?xml-stylesheet type="text/xsl" href="http://jsbsim.sourceforge.net/JSBSim.xsl"?>
<!--
  FlightBox — R-27R (AA-10A ALAMO), a FlightBox-OWN JSBSim model.

  WHY IT IS HERE AND NOT IN vendor/: the pinned submodule carries no Soviet air-to-air missile and is
  read-only (CLAUDE.md Prinzip 1). Reached through FBModule::FdmModelVendored() == false.

  ===========================================================================================
  PROVENANCE. Tags as in doc/modules/mig29/weapons.md §3.1/§3.2:
    [DCS-FM p.68-69] launch mass 253 kg, length 4.00 m, diameter 0.23 m, wing span 0.77 m, fin span
                     0.97 m, 39 kg expanding-rod warhead, documented range 30-35 km
    [DCS-FM p.67]    seeker gimbal limit at launch 50 deg (SARH), max launch g 5, titanium airframe
    [DCS-FM p.64-65] the class: solid motor burning 2-15 s, boosting to Mach 2-3, and "almost
                     uncontrollable" below 800-1,000 km/h — the one motor-side figure that IS documented
    [GAP]            the boost/sustain SPLIT, per the reference base's own §8.2
    [DERIVED] / [SET] as elsewhere in this tree
  ===========================================================================================

  WHAT MAKES THIS ROUND DIFFERENT is not in this file at all: it is SEMI-ACTIVE, so its seeker lives on
  the shooter's illumination and dies with it. That is modelled in modules/missile/FBMissileGuidance and
  declared in core/FBStore.h; the AIRFRAME below is an ordinary slender body and has no opinion about
  what is guiding it — which is the correct division, and the reason a second seeker kind needed no
  second flight model.

  GEOMETRY, against the body cross-section:
    S = pi*0.23^2/4 = 0.0415476 m^2 = 0.447216 ft^2 [DERIVED]
    chord := d = 0.7546 ft [DERIVED]   ·   wingspan := 0.77 m = 2.5262 ft [DCS-FM p.68]
    length 4.00 m = 157 in [DCS-FM p.68]

  MASS. Launch 557.8 lb (253 kg) [DCS-FM p.68]. Propellant 172 lb [DERIVED]: the class boosts to Mach
  2-3, take the middle at dV ~ 850 m/s over a M 0.9 launch; at Isp 235 s (ve = 2305 m/s) that is
  m0/m1 = exp(850/2305) = 1.446 and m_p = 253*(1 - 1/1.446) = 78.0 kg = 172 lb. <emptywt> therefore
  386 lb, which is also the mass the round coasts the last two thirds of its range at.
    Iyy = Izz: 253*4.0^2/12 = 337.3 kg*m^2 = 248.8 slug*ft^2, x0.84 -> 209.
    Ixx = 253*0.115^2/2 = 1.673 kg*m^2 = 1.23 slug*ft^2 [DERIVED].
    CG at station 72 in [SET] — just forward of mid-body.

  AERODYNAMICS: the AIM-120 deck's non-dimensional slender-body set, with the two proportion-dependent
  moments recomputed —
    Cm_de = -1.2 * (148 - 72) in / 9.055 in = -1.2 * 8.39 = -10.1 [DERIVED]
    Cm_alpha = -10.7 [DERIVED] to hold the same ~0.41 rad trim design point at full fin.
-->
<fdm_config name="R-27R" version="2.0" release="ALPHA"
    xmlns:xsi="http://www.w3.org/2001/XMLSchema-instance"
    xsi:noNamespaceSchemaLocation="http://jsbsim.sourceforge.net/JSBSim.xsd">

  <fileheader>
    <author> FlightBox </author>
    <filecreationdate> 2026-07-28 </filecreationdate>
    <version> 1.0 </version>
    <description> R-27R — FlightBox's own model </description>
    <note>
      Built from public geometry and mass figures plus the slender-body aerodynamic set this tree's
      AIM-120 model derives and documents; it is not derived from, and contains nothing out of, any
      restricted source. Per-number provenance in the banner above.
    </note>
  </fileheader>

  <metrics>
    <wingarea  unit="FT2"> 0.447216 </wingarea>
    <wingspan  unit="FT">  2.5262  </wingspan>
    <chord     unit="FT">  0.7546 </chord>
    <htailarea unit="FT2"> 0 </htailarea>
    <htailarm  unit="FT">  0 </htailarm>
    <vtailarea unit="FT2"> 0 </vtailarea>
    <vtailarm  unit="FT">  0 </vtailarm>
    <location name="AERORP" unit="IN">
      <x> 72 </x>
      <y> 0 </y>
      <z> 0 </z>
    </location>
    <location name="VRP" unit="IN">
      <x> 72 </x>
      <y> 0 </y>
      <z> 0 </z>
    </location>
  </metrics>

  <mass_balance>
    <ixx unit="SLUG*FT2">     1.23 </ixx>
    <iyy unit="SLUG*FT2">   209.00 </iyy>
    <izz unit="SLUG*FT2">   209.00 </izz>
    <emptywt unit="LBS">     386.0 </emptywt>
    <location name="CG" unit="IN">
      <x> 72 </x>
      <y> 0 </y>
      <z> 0 </z>
    </location>
  </mass_balance>

  <!-- Present so the model is complete, not so they fire: a weapon in flight is given no ground to
       collide with by its owner (units/FBSimUnit's kWeaponNoGroundElevM), and the impact verdict is
       core/FBFlightMonitor's rather than a spring's. Same values and same reasoning as the AIM-120. -->
  <ground_reactions>
    <contact type="STRUCTURE" name="NOSE_CONTACT">
      <location unit="IN"> <x> 0 </x> <y> 0 </y> <z> 0 </z> </location>
      <static_friction>  0 </static_friction>
      <dynamic_friction> 0 </dynamic_friction>
      <rolling_friction> 0 </rolling_friction>
      <spring_coeff  unit="LBS/FT">      10000 </spring_coeff>
      <damping_coeff unit="LBS/FT/SEC">  20000 </damping_coeff>
      <max_steer unit="DEG"> 0.0 </max_steer>
      <brake_group> NONE </brake_group>
      <retractable> 0 </retractable>
    </contact>
    <contact type="STRUCTURE" name="TAIL_CONTACT">
      <location unit="IN"> <x> 157 </x> <y> 0 </y> <z> 0 </z> </location>
      <static_friction>  0 </static_friction>
      <dynamic_friction> 0 </dynamic_friction>
      <rolling_friction> 0 </rolling_friction>
      <spring_coeff  unit="LBS/FT">      10000 </spring_coeff>
      <damping_coeff unit="LBS/FT/SEC">  20000 </damping_coeff>
      <max_steer unit="DEG"> 0.0 </max_steer>
      <brake_group> NONE </brake_group>
      <retractable> 0 </retractable>
    </contact>
  </ground_reactions>

  <!-- The grain sits AT the CG so the burn changes mass without walking the centre of gravity: a
       shifting CG is a real effect nobody can source a number for, and a wrong one would silently
       change the static margin over the flight. -->
  <propulsion>
    <engine file="R27-motor">
      <feed> 0 </feed>
      <thruster file="R27-motor_nozzle">
        <location unit="IN"> <x> 157 </x> <y> 0 </y> <z> 0 </z> </location>
        <orient unit="DEG"> <roll> 0 </roll> <pitch> 0 </pitch> <yaw> 0 </yaw> </orient>
      </thruster>
    </engine>

    <tank type="FUEL">
      <location unit="IN"> <x> 72 </x> <y> 0 </y> <z> 0 </z> </location>
      <radius unit="IN"> 4.5 </radius>
      <grain_config type="CYLINDRICAL">
        <length unit="IN"> 44 </length>
        <bore_diameter unit="IN"> 1.5 </bore_diameter>
      </grain_config>
      <capacity unit="LBS"> 172.0 </capacity>
      <contents unit="LBS"> 172.0 </contents>
    </tank>
  </propulsion>

  <!-- The three normalised control channels every FlightBox airframe exposes (fdm/FBFdm.h), through a
       first-order actuator (lag c1 = 60 1/s, ~17 ms) into a +-25 deg fin deflection. A cruciform
       tail-controlled round mixes four fins into pitch/yaw/roll; the mixing is linear and adds nothing
       to the physics, so the three axes are modelled directly. -->
  <flight_control name="FCS: R-27R fins">
    <channel name="Pitch">
      <lag_filter name="fcs/elevator-actuator">
        <input> fcs/elevator-cmd-norm </input>
        <c1> 60.0 </c1>
        <clipto> <min> -1.0 </min> <max> 1.0 </max> </clipto>
      </lag_filter>
      <aerosurface_scale name="fcs/elevator-scale">
        <input> fcs/elevator-actuator </input>
        <range> <min> -0.4363 </min> <max> 0.4363 </max> </range>
        <output> fcs/elevator-pos-rad </output>
      </aerosurface_scale>
    </channel>
    <channel name="Yaw">
      <lag_filter name="fcs/rudder-actuator">
        <input> fcs/rudder-cmd-norm </input>
        <c1> 60.0 </c1>
        <clipto> <min> -1.0 </min> <max> 1.0 </max> </clipto>
      </lag_filter>
      <aerosurface_scale name="fcs/rudder-scale">
        <input> fcs/rudder-actuator </input>
        <range> <min> -0.4363 </min> <max> 0.4363 </max> </range>
        <output> fcs/rudder-pos-rad </output>
      </aerosurface_scale>
    </channel>
    <channel name="Roll">
      <lag_filter name="fcs/aileron-actuator">
        <input> fcs/aileron-cmd-norm </input>
        <c1> 60.0 </c1>
        <clipto> <min> -1.0 </min> <max> 1.0 </max> </clipto>
      </lag_filter>
      <aerosurface_scale name="fcs/aileron-scale">
        <input> fcs/aileron-actuator </input>
        <range> <min> -0.4363 </min> <max> 0.4363 </max> </range>
        <output> fcs/left-aileron-pos-rad </output>
      </aerosurface_scale>
    </channel>
  </flight_control>

  <aerodynamics>

    <axis name="AXIAL">
      <!-- CA(M): zero-lift axial force, body cross-section referenced [SET — a slender-body/finned-
           missile profile: flat subsonic, the transonic wave-drag rise from M 0.95, the peak just past
           M 1, then the classic supersonic decay. No public AMRAAM drag deck exists. The absolute level
           is anchored by statement (3) above.] -->
      <function name="aero/coefficient/CA">
        <description> Axial force (zero lift) </description>
        <product>
          <property> aero/qbar-psf </property>
          <property> metrics/Sw-sqft </property>
          <table>
            <independentVar> velocities/mach </independentVar>
            <tableData>
              0.0000  0.400
              0.6000  0.410
              0.8000  0.430
              0.9000  0.470
              0.9500  0.550
              1.0500  0.820
              1.2000  0.840
              1.5000  0.780
              2.0000  0.680
              2.5000  0.600
              3.0000  0.550
              4.0000  0.470
              5.0000  0.440
            </tableData>
          </table>
        </product>
      </function>
      <!-- Induced axial force: an incidence-dependent addition on top of CA0, since a body at alpha
           presents more frontal area and its fins carry induced drag. 0.9*alpha^2 [SET] is the
           small-angle fit that keeps the total drag at 23 deg alpha near CA0 + CN*sin(alpha), i.e.
           consistent with the force resolution the body-axis formulation already does. -->
      <function name="aero/coefficient/CA_alpha">
        <description> Axial force due to angle of attack </description>
        <product>
          <property> aero/qbar-psf </property>
          <property> metrics/Sw-sqft </property>
          <value> 0.9 </value>
          <property> aero/alpha-rad </property>
          <property> aero/alpha-rad </property>
        </product>
      </function>
    </axis>

    <axis name="NORMAL">
      <!-- CN_alpha(M) per radian [SET — slender body + cruciform mid-body wings; the transonic peak and
           the supersonic decay follow linear-theory behaviour, the level is anchored by statement (2)]. -->
      <function name="aero/coefficient/CN_alpha">
        <description> Normal force due to angle of attack </description>
        <product>
          <property> aero/qbar-psf </property>
          <property> metrics/Sw-sqft </property>
          <property> aero/alpha-rad </property>
          <table>
            <independentVar> velocities/mach </independentVar>
            <tableData>
              0.0000   9.00
              0.8000   9.20
              1.0500  11.00
              1.2000  11.50
              1.5000  10.50
              2.0000   9.50
              2.5000   8.80
              3.0000   8.20
              4.0000   7.40
              5.0000   7.00
            </tableData>
          </table>
        </product>
      </function>
      <!-- Crossflow (body vortex) term, 10.0*alpha*|alpha| per rad^2 [SET]: the nonlinear normal force
           a cylindrical body develops at high incidence. Without it the missile would lose exactly the
           lift it needs in the terminal turn, where it flies at 20+ deg. -->
      <function name="aero/coefficient/CN_alpha2">
        <description> Normal force, crossflow (nonlinear in alpha) </description>
        <product>
          <property> aero/qbar-psf </property>
          <property> metrics/Sw-sqft </property>
          <value> 10.0 </value>
          <property> aero/alpha-rad </property>
          <abs> <property> aero/alpha-rad </property> </abs>
        </product>
      </function>
      <!-- Fin normal force, -1.2 per rad [SET, paired with Cm_de below by the moment arm]: a tail fin
           deflected trailing-edge-down (positive) pushes the TAIL up, i.e. produces a nose-DOWN moment
           AND an upward force. That is the non-minimum-phase behaviour of tail control — the airframe
           first moves the wrong way — and it is modelled because the guidance loop has to be stable
           with it. -->
      <function name="aero/coefficient/CN_de">
        <description> Normal force due to pitch fin deflection </description>
        <product>
          <property> aero/qbar-psf </property>
          <property> metrics/Sw-sqft </property>
          <value> 1.2 </value>
          <property> fcs/elevator-pos-rad </property>
        </product>
      </function>
    </axis>

    <axis name="SIDE">
      <!-- Cruciform symmetry: the yaw plane is the pitch plane, mirrored. beta > 0 (relative wind from
           the right) produces a force to the LEFT, hence the negative signs. -->
      <function name="aero/coefficient/CY_beta">
        <description> Side force due to sideslip </description>
        <product>
          <property> aero/qbar-psf </property>
          <property> metrics/Sw-sqft </property>
          <property> aero/beta-rad </property>
          <value> -1.0 </value>
          <table>
            <independentVar> velocities/mach </independentVar>
            <tableData>
              0.0000   9.00
              0.8000   9.20
              1.0500  11.00
              1.2000  11.50
              1.5000  10.50
              2.0000   9.50
              2.5000   8.80
              3.0000   8.20
              4.0000   7.40
              5.0000   7.00
            </tableData>
          </table>
        </product>
      </function>
      <function name="aero/coefficient/CY_beta2">
        <description> Side force, crossflow (nonlinear in beta) </description>
        <product>
          <property> aero/qbar-psf </property>
          <property> metrics/Sw-sqft </property>
          <value> -10.0 </value>
          <property> aero/beta-rad </property>
          <abs> <property> aero/beta-rad </property> </abs>
        </product>
      </function>
      <function name="aero/coefficient/CY_dr">
        <description> Side force due to yaw fin deflection </description>
        <product>
          <property> aero/qbar-psf </property>
          <property> metrics/Sw-sqft </property>
          <value> -1.2 </value>
          <property> fcs/rudder-pos-rad </property>
        </product>
      </function>
    </axis>

    <axis name="PITCH">
      <!-- Cm_alpha = -10.7 per rad [SET]: the static margin, expressed directly as a moment about the
           launch CG. Paired with Cm_de by statement (1) — the pair, not either number alone, is what
           fixes the trim angle of attack and therefore the achievable g. A statically STABLE missile
           (negative Cm_alpha) is what makes the airframe controllable with a first-order autopilot;
           reducing this number would make it more agile and less stable, which is a design trade this
           model does not pretend to have data for. -->
      <function name="aero/coefficient/Cm_alpha">
        <description> Pitch moment due to angle of attack </description>
        <product>
          <property> aero/qbar-psf </property>
          <property> metrics/Sw-sqft </property>
          <property> metrics/cbarw-ft </property>
          <property> aero/alpha-rad </property>
          <value> -10.7 </value>
        </product>
      </function>
      <!-- Cm_q = -500 per rad [SET]: aerodynamic pitch damping. Deliberately LOW in damping-ratio terms
           (zeta ~ 0.01 at Mach 2/6 km against a 6.6 rad/s airframe mode) because that is what a short,
           finned body actually has — a real missile is stabilised by its autopilot's rate gyro, not by
           its aerodynamics, and modules/missile/FBMissileGuidance therefore carries a rate-damping term
           it genuinely needs. -->
      <function name="aero/coefficient/Cm_q">
        <description> Pitch moment due to pitch rate </description>
        <product>
          <property> aero/qbar-psf </property>
          <property> metrics/Sw-sqft </property>
          <property> metrics/cbarw-ft </property>
          <property> aero/ci2vel </property>
          <property> velocities/q-aero-rad_sec </property>
          <value> -500.0 </value>
        </product>
      </function>
      <!-- Cm_de = -10.1 per rad [DERIVED from the fin force above and its arm:
           the tail fins sit at station 148 in and the launch CG at 72 in, so the arm is 76 in
           = 8.39 calibers of the 9.055 in body, and Cm_de = -1.2 * 8.39 = -10.1]. Negative: positive (TE-down)
           deflection pitches the nose DOWN, which is what makes FBFdm's existing "+pitch command =
           nose up" mapping (it writes -pitch into fcs/elevator-cmd-norm) come out right. -->
      <function name="aero/coefficient/Cm_de">
        <description> Pitch moment due to pitch fin deflection </description>
        <product>
          <property> aero/qbar-psf </property>
          <property> metrics/Sw-sqft </property>
          <property> metrics/cbarw-ft </property>
          <property> fcs/elevator-pos-rad </property>
          <value> -10.1 </value>
        </product>
      </function>
    </axis>

    <axis name="YAW">
      <!-- The pitch axis mirrored (cruciform). Cn_beta > 0 is weathercock stability: sideslip from the
           right yaws the nose right, into the wind. -->
      <function name="aero/coefficient/Cn_beta">
        <description> Yaw moment due to sideslip </description>
        <product>
          <property> aero/qbar-psf </property>
          <property> metrics/Sw-sqft </property>
          <property> metrics/cbarw-ft </property>
          <property> aero/beta-rad </property>
          <value> 10.7 </value>
        </product>
      </function>
      <function name="aero/coefficient/Cn_r">
        <description> Yaw moment due to yaw rate </description>
        <product>
          <property> aero/qbar-psf </property>
          <property> metrics/Sw-sqft </property>
          <property> metrics/cbarw-ft </property>
          <property> aero/ci2vel </property>
          <property> velocities/r-aero-rad_sec </property>
          <value> -500.0 </value>
        </product>
      </function>
      <function name="aero/coefficient/Cn_dr">
        <description> Yaw moment due to yaw fin deflection </description>
        <product>
          <property> aero/qbar-psf </property>
          <property> metrics/Sw-sqft </property>
          <property> metrics/cbarw-ft </property>
          <property> fcs/rudder-pos-rad </property>
          <value> 10.1 </value>
        </product>
      </function>
    </axis>

    <axis name="ROLL">
      <!-- Roll is not a manoeuvre axis for a cruciform missile: it flies SKID-TO-TURN, pitching and
           yawing without banking, and the roll channel exists only to hold the fin cross steady so the
           two lateral channels stay decoupled. Cl_p = -12 per rad [SET] (strong damping, small span),
           Cl_da = 0.05 per rad [SET] — together a steady roll rate of ~4 rad/s at full fin and Mach 2,
           enough to arrest a roll disturbance in a fraction of a second and far too little to be used
           for turning. -->
      <function name="aero/coefficient/Cl_p">
        <description> Roll moment due to roll rate </description>
        <product>
          <property> aero/qbar-psf </property>
          <property> metrics/Sw-sqft </property>
          <property> metrics/bw-ft </property>
          <property> aero/bi2vel </property>
          <property> velocities/p-aero-rad_sec </property>
          <value> -12.0 </value>
        </product>
      </function>
      <function name="aero/coefficient/Cl_da">
        <description> Roll moment due to roll fin deflection </description>
        <product>
          <property> aero/qbar-psf </property>
          <property> metrics/Sw-sqft </property>
          <property> metrics/bw-ft </property>
          <property> fcs/left-aileron-pos-rad </property>
          <value> 0.05 </value>
        </product>
      </function>
    </axis>

  </aerodynamics>

</fdm_config>
