<?xml version="1.0"?>
<!-- FlightBox — Super 530F solid rocket motor, GENERATED by tools/gen_air_stores.py.

     propellant   m_p = m0*(1 - 1/exp(dV/ve)) = 245.0*(1 - 1/exp(1078/2305))
                      = 91.5 kg = 201.8 lb
                      [DERIVED, the tree's shared Isp 235 s -> ve = 2305 m/s]
     dV is a DELTA over the 250 m/s separation speed: an air-launched round starts with the
     shooter's own energy, which is the one place this recipe differs from the surface-to-air one.
     total impulse = 91.5 * 2305 = 210913 N*s
     boost   54837 N (12328 lbf) x 2.5 s
     sustain 18455 N (4149 lbf) x 4.0 s, 35 % of the impulse
     JSBSim's contract: the table is indexed by PROPELLANT BURNED (lb) and yields VACUUM thrust (lbf);
     the engine consumes wdot = thrust/Isp itself, so burn TIME is an outcome and never stated here.
     THE BURN SPLIT IS [SET] within the class bound of 2-15 s that core/FBStore.h's R-27R row already
     declares; no public source gives one for any round in this file.
-->
<rocket_engine name="Super 530F motor (FlightBox)">

  <isp> 235 </isp>

  <!-- Ignition transient, [SET] 60 ms, as every other FlightBox motor. -->
  <builduptime> 0.06 </builduptime>

  <thrust_table name="propulsion/thrust_prop_remain" type="internal">
    <tableData><!--
      propellant burned (lb)   vacuum thrust (lbf) -->
       0.00      12328.0
     131.15      12328.0
     131.35       4148.8
     201.57       4148.8
     201.77          0.0
    </tableData>
  </thrust_table>

</rocket_engine>
