<?xml version="1.0"?>
<!--
  FlightBox — AL-21F-3, GENERATED by tools/gen_air_decks.py from doc/modules/air/flight-model-recipe.md
  §5. DO NOT EDIT: the next run of the tool overwrites this file.

  1 instance(s) of this deck are the Su-17M4 / Su-22M4's propulsion; placement lives in su22.xml.

  THE STATICS ARE PUBLISHED AND THE SURFACES ARE NOT. milthrust/maxthrust are the catalogue's own
  A7 figures [T4]; the (Mach, density-altitude) surfaces are the recipe's CONSTRUCTED turbojet reference: sigma^0.90 (dry) / sigma^0.85 (aug) altitude lapse times the ram curve (1+0.2M^2)^2.5*(Ve-V)/Ve, calibrated on mig21. They are DIMENSIONLESS
  FACTORS normalised to 1.0 at M0/sea level, so setting the statics IS the scaling step, exactly and
  with nothing in between.

  AND THE RULE THAT GOES WITH IT (recipe §0): this deck is FROZEN. The envelope anchors constrain the
  PRODUCT T/D and never T and D separately, so all residual error is absorbed by the drag polar in
  su22.xml. If that forces an implausible CD0, THIS FILE is the suspect.
-->

<turbine_engine name="AL-21F-3">
  <!-- A7 [T4]: 76.40 kN dry / 109.80 kN augmented, static, sea level, M0. -->
  <milthrust> 17175.4 </milthrust>
  <maxthrust> 24684.0 </maxthrust>

  <bypassratio> 0.00 </bypassratio>
  <tsfc> 0.90 </tsfc>
  <atsfc> 2.20 </atsfc>

  <!-- Idle spool speeds [SET] at the pinned F-16 deck's own values: no source states them for any
       engine in this catalogue, and one borrowed pair is better than ten invented ones. -->
  <idlen1> 30.0 </idlen1>
  <idlen2> 60.0 </idlen2>
  <maxn1> 100.0 </maxn1>
  <maxn2> 100.0 </maxn2>

  <augmented> 1 </augmented>
  <augmethod> 2 </augmethod>
  <injected> 0 </injected>

  <function name="IdleThrust">
   <table>
    <independentVar lookup="row">velocities/mach</independentVar>
    <independentVar lookup="column">atmosphere/density-altitude</independentVar>
    <tableData>
         -10000       0   10000   20000   30000   40000   50000   60000   70000   80000   90000  100000
    0.00  0.0527  0.0400  0.0304  0.0227  0.0165  0.0113  0.0074  0.0048  0.0031  0.0020  0.0013  0.0008
    0.20  0.0327  0.0248  0.0190  0.0143  0.0104  0.0072  0.0047  0.0030  0.0020  0.0013  0.0008  0.0005
    0.40 -0.0173 -0.0131 -0.0098 -0.0071 -0.0050 -0.0034 -0.0022 -0.0014 -0.0009 -0.0006 -0.0004 -0.0003
    0.60 -0.0979 -0.0743 -0.0562 -0.0416 -0.0300 -0.0205 -0.0133 -0.0086 -0.0056 -0.0036 -0.0023 -0.0015
    0.80 -0.2095 -0.1590 -0.1204 -0.0894 -0.0647 -0.0442 -0.0287 -0.0186 -0.0120 -0.0078 -0.0050 -0.0033
    1.00 -0.3526 -0.2676 -0.2029 -0.1506 -0.1091 -0.0746 -0.0484 -0.0314 -0.0203 -0.0131 -0.0085 -0.0055
    1.20 -0.5279 -0.4006 -0.3038 -0.2256 -0.1634 -0.1118 -0.0725 -0.0471 -0.0304 -0.0196 -0.0127 -0.0083
    1.40 -0.7363 -0.5588 -0.4237 -0.3146 -0.2279 -0.1559 -0.1012 -0.0656 -0.0424 -0.0273 -0.0177 -0.0116
    1.60 -0.9790 -0.7430 -0.5633 -0.4181 -0.3028 -0.2071 -0.1344 -0.0872 -0.0563 -0.0363 -0.0236 -0.0154
    1.80 -1.2577 -0.9546 -0.7234 -0.5367 -0.3885 -0.2658 -0.1724 -0.1119 -0.0723 -0.0466 -0.0302 -0.0197
    2.00 -1.5747 -1.1952 -0.9053 -0.6713 -0.4857 -0.3321 -0.2155 -0.1398 -0.0903 -0.0582 -0.0378 -0.0247
    </tableData>
   </table>
  </function>

  <function name="MilThrust">
   <table>
    <independentVar lookup="row">velocities/mach</independentVar>
    <independentVar lookup="column">atmosphere/density-altitude</independentVar>
    <tableData>
         -10000       0   10000   20000   30000   40000   50000   60000   70000   80000   90000  100000
    0.00  1.3176  1.0000  0.7612  0.5674  0.4128  0.2832  0.1838  0.1192  0.0770  0.0496  0.0322  0.0210
    0.20  1.2134  0.9209  0.7037  0.5266  0.3846  0.2646  0.1717  0.1114  0.0719  0.0463  0.0300  0.0195
    0.40  1.1483  0.8715  0.6690  0.5031  0.3692  0.2548  0.1653  0.1072  0.0692  0.0445  0.0288  0.0188
    0.60  1.1104  0.8428  0.6508  0.4923  0.3635  0.2517  0.1633  0.1060  0.0684  0.0439  0.0284  0.0185
    0.80  1.0881  0.8258  0.6426  0.4899  0.3645  0.2537  0.1646  0.1068  0.0688  0.0442  0.0286  0.0186
    1.00  1.0680  0.8106  0.6375  0.4910  0.3691  0.2584  0.1677  0.1088  0.0701  0.0449  0.0290  0.0188
    1.20  1.0335  0.7844  0.6264  0.4895  0.3733  0.2635  0.1710  0.1109  0.0714  0.0457  0.0294  0.0190
    1.40  0.9621  0.7302  0.5973  0.4773  0.3715  0.2654  0.1722  0.1117  0.0718  0.0458  0.0294  0.0190
    1.60  0.8229  0.6246  0.5337  0.4429  0.3563  0.2592  0.1682  0.1091  0.0700  0.0445  0.0284  0.0182
    1.80  0.5740  0.4357  0.4129  0.3706  0.3172  0.2382  0.1546  0.1003  0.0641  0.0404  0.0256  0.0163
    2.00  0.1588  0.1205  0.2043  0.2394  0.2401  0.1932  0.1254  0.0813  0.0516  0.0320  0.0199  0.0125
    </tableData>
   </table>
  </function>

  <function name="AugThrust">
   <table>
    <independentVar lookup="row">velocities/mach</independentVar>
    <independentVar lookup="column">atmosphere/density-altitude</independentVar>
    <tableData>
         -10000       0   10000   20000   30000   40000   50000   60000   70000   80000   90000  100000
    0.00  1.2976  1.0000  0.7728  0.5856  0.4336  0.3038  0.2019  0.1342  0.0888  0.0586  0.0389  0.0260
    0.20  1.2544  0.9667  0.7486  0.5683  0.4217  0.2958  0.1966  0.1307  0.0864  0.0571  0.0379  0.0253
    0.40  1.2569  0.9686  0.7517  0.5720  0.4253  0.2988  0.1986  0.1320  0.0873  0.0576  0.0382  0.0255
    0.60  1.3014  1.0030  0.7802  0.5951  0.4437  0.3122  0.2075  0.1379  0.0912  0.0601  0.0399  0.0266
    0.80  1.3863  1.0684  0.8333  0.6374  0.4766  0.3360  0.2233  0.1484  0.0981  0.0647  0.0429  0.0286
    1.00  1.5110  1.1645  0.9112  0.6992  0.5244  0.3704  0.2462  0.1636  0.1081  0.0713  0.0472  0.0315
    1.20  1.6756  1.2913  1.0140  0.7809  0.5879  0.4161  0.2766  0.1838  0.1215  0.0800  0.0530  0.0353
    1.40  1.8793  1.4483  1.1420  0.8831  0.6676  0.4738  0.3149  0.2093  0.1382  0.0910  0.0602  0.0401
    1.60  2.1199  1.6338  1.2945  1.0059  0.7641  0.5438  0.3614  0.2402  0.1586  0.1043  0.0690  0.0459
    1.80  2.3924  1.8438  1.4693  1.1483  0.8771  0.6264  0.4163  0.2767  0.1827  0.1200  0.0793  0.0527
    2.00  2.6875  2.0712  1.6622  1.3079  1.0057  0.7210  0.4792  0.3185  0.2102  0.1380  0.0911  0.0605
    2.20  2.9900  2.3044  1.8655  1.4800  1.1471  0.8263  0.5492  0.3650  0.2407  0.1578  0.1041  0.0690
    2.40  3.2772  2.5257  2.0673  1.6572  1.2969  0.9395  0.6244  0.4150  0.2735  0.1791  0.1179  0.0781
    2.60  3.5162  2.7098  2.2504  1.8279  1.4480  1.0563  0.7020  0.4666  0.3073  0.2009  0.1320  0.0873
    2.80  3.6620  2.8222  2.3906  1.9760  1.5900  1.1700  0.7776  0.5168  0.3401  0.2218  0.1455  0.0959
    3.20  3.4168  2.6333  2.4025  2.1092  1.7843  1.3484  0.8962  0.5956  0.3908  0.2532  0.1650  0.1081
    </tableData>
   </table>
  </function>

</turbine_engine>
