<?xml version="1.0"?>
<!--
  FlightBox — F100-PW-220, GENERATED by tools/gen_air_decks.py from doc/modules/air/flight-model-recipe.md
  §5. DO NOT EDIT: the next run of the tool overwrites this file.

  2 instance(s) of this deck are the F-15C Eagle's propulsion; placement lives in f15c.xml.

  THE STATICS ARE PUBLISHED AND THE SURFACES ARE NOT. milthrust/maxthrust are the catalogue's own
  A7 figures [T4]; the (Mach, density-altitude) surfaces are the pinned F-16 model's own F100-PW-229 deck, with its 60k/70k columns continued by the ISA density ratio instead of its zero column. They are DIMENSIONLESS
  FACTORS normalised to 1.0 at M0/sea level, so setting the statics IS the scaling step, exactly and
  with nothing in between.

  AND THE RULE THAT GOES WITH IT (recipe §0): this deck is FROZEN. The envelope anchors constrain the
  PRODUCT T/D and never T and D separately, so all residual error is absorbed by the drag polar in
  f15c.xml. If that forces an implausible CD0, THIS FILE is the suspect.
-->

<turbine_engine name="F100-PW-220">
  <!-- A7 [T4]: 64.90 kN dry / 105.70 kN augmented, static, sea level, M0. -->
  <milthrust> 14590.1 </milthrust>
  <maxthrust> 23762.3 </maxthrust>

  <bypassratio> 0.36 </bypassratio>
  <tsfc> 0.74 </tsfc>
  <atsfc> 2.05 </atsfc>

  <!-- Idle spool speeds [SET] at the pinned F-16 deck's own values: no source states them for any
       engine in this catalogue, and one borrowed pair is better than ten invented ones. -->
  <idlen1> 30.0 </idlen1>
  <idlen2> 60.0 </idlen2>
  <maxn1> 100.0 </maxn1>
  <maxn2> 100.0 </maxn2>

  <augmented> 1 </augmented>
  <augmethod> 2 </augmethod>
  <injected> 0 </injected>

  <function name="IdleThrust">
   <table>
    <independentVar lookup="row">velocities/mach</independentVar>
    <independentVar lookup="column">atmosphere/density-altitude</independentVar>
    <tableData>
         -10000       0   10000   20000   30000   40000   50000   60000   70000   80000   90000  100000
    0.00  0.0430  0.0488  0.0528  0.0694  0.0899  0.1183  0.1467  0.0908  0.0508  0.0312  0.0193  0.0120
    0.20  0.0500  0.0501  0.0335  0.0544  0.0797  0.1049  0.1342  0.0831  0.0464  0.0285  0.0176  0.0109
    0.40  0.0040  0.0047  0.0020  0.0272  0.0595  0.0891  0.1203  0.0745  0.0416  0.0255  0.0158  0.0098
    0.60 -0.0804 -0.0804 -0.0560 -0.0237  0.0276  0.0718  0.1073  0.0664  0.0371  0.0228  0.0141  0.0087
    0.80 -0.2129 -0.2129 -0.1498 -0.1025  0.0474  0.0868  0.0900  0.0557  0.0311  0.0191  0.0118  0.0073
    1.00 -0.2839 -0.2839 -0.1104 -0.0469 -0.0270  0.0552  0.0800  0.0495  0.0277  0.0170  0.0105  0.0065
    </tableData>
   </table>
  </function>

  <function name="MilThrust">
   <table>
    <independentVar lookup="row">velocities/mach</independentVar>
    <independentVar lookup="column">atmosphere/density-altitude</independentVar>
    <tableData>
         -10000       0   10000   20000   30000   40000   50000   60000   70000   80000   90000  100000
    0.00  1.2600  1.0000  0.7400  0.5340  0.3720  0.2410  0.1490  0.0922  0.0515  0.0316  0.0195  0.0121
    0.20  1.1710  0.9340  0.6970  0.5060  0.3550  0.2310  0.1430  0.0885  0.0495  0.0304  0.0188  0.0117
    0.40  1.1500  0.9210  0.6920  0.5060  0.3570  0.2330  0.1450  0.0898  0.0502  0.0308  0.0190  0.0118
    0.60  1.1810  0.9510  0.7210  0.5320  0.3780  0.2480  0.1540  0.0953  0.0533  0.0327  0.0202  0.0126
    0.80  1.2580  1.0200  0.7820  0.5820  0.4170  0.2750  0.1700  0.1052  0.0588  0.0361  0.0223  0.0139
    1.00  1.3690  1.1200  0.8710  0.6510  0.4750  0.3150  0.1950  0.1207  0.0675  0.0414  0.0256  0.0159
    1.20  1.4850  1.2300  0.9750  0.7440  0.5450  0.3640  0.2250  0.1393  0.0779  0.0478  0.0295  0.0184
    1.40  1.5941  1.3400  1.0860  0.8450  0.6280  0.4240  0.2630  0.1628  0.0910  0.0558  0.0345  0.0215
    </tableData>
   </table>
  </function>

  <function name="AugThrust">
   <table>
    <independentVar lookup="row">velocities/mach</independentVar>
    <independentVar lookup="column">atmosphere/density-altitude</independentVar>
    <tableData>
         -10000       0   10000   20000   30000   40000   50000   60000   70000   80000   90000  100000
    0.00  1.1816  1.0000  0.8184  0.6627  0.5280  0.3756  0.2327  0.1440  0.0805  0.0494  0.0305  0.0190
    0.20  1.1308  0.9599  0.7890  0.6406  0.5116  0.3645  0.2258  0.1398  0.0781  0.0479  0.0296  0.0184
    0.40  1.1150  0.9474  0.7798  0.6340  0.5070  0.3615  0.2240  0.1386  0.0775  0.0476  0.0294  0.0183
    0.60  1.1284  0.9589  0.7894  0.6420  0.5134  0.3661  0.2268  0.1404  0.0785  0.0482  0.0298  0.0185
    0.80  1.1707  0.9942  0.8177  0.6647  0.5309  0.3784  0.2345  0.1452  0.0811  0.0498  0.0307  0.0191
    1.00  1.2411  1.0529  0.8648  0.7017  0.5596  0.3983  0.2467  0.1527  0.0854  0.0524  0.0324  0.0201
    1.20  1.3287  1.1254  0.9221  0.7462  0.5936  0.4219  0.2614  0.1618  0.0904  0.0555  0.0343  0.0213
    1.40  1.4365  1.2149  0.9933  0.8021  0.6360  0.4509  0.2794  0.1729  0.0967  0.0593  0.0367  0.0228
    1.60  1.5711  1.3260  1.0809  0.8700  0.6874  0.4860  0.3011  0.1864  0.1042  0.0639  0.0395  0.0246
    1.80  1.7301  1.4579  1.1857  0.9512  0.7495  0.5289  0.3277  0.2028  0.1134  0.0696  0.0430  0.0267
    2.00  1.8314  1.5700  1.3086  1.0474  0.8216  0.5786  0.3585  0.2219  0.1240  0.0761  0.0470  0.0292
    2.20  1.9700  1.6900  1.4100  1.2400  0.9100  0.6359  0.3940  0.2439  0.1363  0.0836  0.0517  0.0321
    2.40  2.0700  1.8000  1.5300  1.3400  1.0000  0.7200  0.4600  0.2847  0.1592  0.0977  0.0604  0.0375
    2.60  2.2000  1.9200  1.6400  1.4400  1.1000  0.8000  0.5200  0.3219  0.1799  0.1104  0.0682  0.0424
    </tableData>
   </table>
  </function>

</turbine_engine>
