<?xml version="1.0"?>
<!-- FlightBox — K-13 (R-13M) solid rocket motor, GENERATED by tools/gen_air_stores.py.

     propellant   m_p = m0*(1 - 1/exp(dV/ve)) = 90.0*(1 - 1/exp(488/2305))
                      = 17.2 kg = 37.8 lb
                      [DERIVED, the tree's shared Isp 235 s -> ve = 2305 m/s]
     dV is a DELTA over the 250 m/s separation speed: an air-launched round starts with the
     shooter's own energy, which is the one place this recipe differs from the surface-to-air one.
     total impulse = 17.2 * 2305 = 39558 N*s
     boost   7912 N (1779 lbf) x 5.0 s
     single-pulse motor: no sustainer, which is what an infrared dogfight round has
     JSBSim's contract: the table is indexed by PROPELLANT BURNED (lb) and yields VACUUM thrust (lbf);
     the engine consumes wdot = thrust/Isp itself, so burn TIME is an outcome and never stated here.
     THE BURN SPLIT IS [SET] within the class bound of 2-15 s that core/FBStore.h's R-27R row already
     declares; no public source gives one for any round in this file.
-->
<rocket_engine name="K-13 (R-13M) motor (FlightBox)">

  <isp> 235 </isp>

  <!-- Ignition transient, [SET] 60 ms, as every other FlightBox motor. -->
  <builduptime> 0.06 </builduptime>

  <thrust_table name="propulsion/thrust_prop_remain" type="internal">
    <tableData><!--
      propellant burned (lb)   vacuum thrust (lbf) -->
       0.00       1778.6
      37.84       1778.6
      37.84          0.0
    </tableData>
  </thrust_table>

</rocket_engine>
