<?xml version="1.0"?>
<?xml-stylesheet type="text/xsl" href="http://jsbsim.sourceforge.net/JSBSim.xsl"?>
<!--
  FlightBox — MiG-25PD, a FlightBox-OWN JSBSim model, GENERATED by tools/gen_air_decks.py.
  DO NOT EDIT BY HAND: the next run of the tool overwrites this file, and a hand edit would break the
  one property that makes ten decks affordable — that they all came out of ONE procedure.

  ============================================================================================
  READ THIS BEFORE QUOTING ANY NUMBER BELOW AS A MiG-25PD PROPERTY.

  This is a CATALOGUE CELL, not a module: an airframe FlightBox is not judged on
  (doc/modules/air/module.md §Spec 1). There is no wind-tunnel dataset behind it at any confidence
  tier. Every aerodynamic number here is one of exactly four things:

    [INV]      INVERTED from a published envelope anchor by the equations of motion. The anchor is
               named at the number.
    [GEO]      COMPUTED FROM GEOMETRY by a standard method (DATCOM / lifting-line / tail volume).
    [ANALOGY]  TAKEN FROM A DIFFERENT AIRCRAFT'S PUBLIC DATA, declared as such.
    [SET]      A DECLARED FlightBox SETTING; the reasoning is stated and the consequence measurable.

  WHAT THIS DECK DELIBERATELY CANNOT DO (recipe R7 / module.md A1): there is NO post-stall and NO
  departure aerodynamics. The linear range is modelled and stops; systems/FBFlightControl's alpha
  limiter is not a MODELLED boundary but the EDGE OF THE MODEL. A catalogue fighter is at its most
  faithful in the BVR arena and at its least faithful in a slow-speed knife fight.

  ROW NOTE: RECIPE R2, NAMED IN ADVANCE: the R-15 was designed for sustained M2.8+ with ram compression an M2 engine never sees, so the reference surface — calibrated at M2.05 — is extrapolating by a full Mach number at exactly this row's most important anchor. IT WILL BE THE RECIPE'S WORST ROW AND THAT IS PREDICTED, NOT DISCOVERED. A5 +4.5 g is the ROW: a sourced airframe limit (aileron reversal, 70 cm wingtip flex), not a modelling weakness. Both free probes close exactly.
  ============================================================================================

  THE POLAR'S PROVENANCE, number by number (recipe §4.2, and every inverted CD0 is published beside
  the frozen thrust that produced it, so a later reader can re-solve without re-deriving):
    A2 M1.06 at     0 m [INV]: T =  240.8 kN (FROZEN analogy, 2 x 100.1 kN static), q*S =  4893.2 kN, CL 0.0736, CD 0.0492, k*CL^2 0.00082  ->  CD0 = 0.0484
    A1 M3.10 at 13000 m [INV]: T =  237.8 kN (FROZEN analogy, 2 x 100.1 kN static), q*S =  6819.4 kN, CL 0.0528, CD 0.0349, k*CL^2 0.00042  ->  CD0 = 0.0345
    subsonic level 0.0200 [ANALOGY from the F-5E's published CD0, the catalogue's ONLY one] — the same generalisation recipe §4.1 makes for e, and it is here because A4 inverts a subsonic CD0 for no row at all (see the tool's header)

  STRUCTURAL FRAME: origin at the NOSE TIP, x positive AFT, y positive to starboard, z positive up,
  z = 0 on the fuselage reference line. Overall length 23.82 m = 938 in [T4].
-->
<fdm_config name="MiG-25PD" version="2.0" release="ALPHA"
    xmlns:xsi="http://www.w3.org/2001/XMLSchema-instance"
    xsi:noNamespaceSchemaLocation="http://jsbsim.sourceforge.net/JSBSim.xsd">

  <fileheader>
    <author> FlightBox (tools/gen_air_decks.py) </author>
    <license licenseName="GPL-2.0-or-later" licenseURL="https://www.gnu.org/licenses/gpl-2.0.html"/>
    <filecreationdate> 2026-07-28 </filecreationdate>
    <version> 1.0 </version>
    <description> MiG-25PD — a GENERATED FlightBox catalogue deck, doc/modules/air/flight-model-recipe.md </description>
    <note>
      GENERATED FROM EIGHT PUBLISHED ENVELOPE ANCHORS BY CLOSED-FORM INVERSION, NOT MEASURED. release=
      ALPHA until `make -C sim test-air mig25` puts every anchor inside its band (recipe §7.1) AND the
      row passes module.md §Spec 11's attribution test. There is no PRODUCTION for a catalogue row.
    </note>
  </fileheader>

  <!-- ============================== GEOMETRY (recipe §2) ============================== -->
  <metrics>
    <!-- A8 [T4]. Every coefficient below is non-dimensionalised against exactly this number. -->
    <wingarea unit="FT2"> 660.9 </wingarea>
    <wingspan unit="FT"> 45.96 </wingspan>
    <!-- [DERIVED] mean GEOMETRIC chord = S/b. True MAC differs with taper; the whole polar is written
         against this reference and never mixed with another, so the +-10 % cancels. -->
    <chord unit="FT"> 14.38 </chord>
    <!-- [SET] 0.20*S / 0.15*S and 0.42*L / 0.40*L: tail areas and arms are almost never published, and
         they set only damping and control power — control power is INVERTED against A5 below, so an
         error here is absorbed one step later. vtailarm is explicitly NOT left at 0: the pinned F-16
         deck's unfilled field is a defect this recipe does not repeat. -->
    <htailarea unit="FT2"> 132.2 </htailarea>
    <htailarm unit="FT"> 32.82 </htailarm>
    <vtailarea unit="FT2"> 99.1 </vtailarea>
    <vtailarm unit="FT"> 31.26 </vtailarm>
    <!-- AERORP sits ON the design CG station, so every moment coefficient is a moment about that point
         and the static margin is exactly -dCm/dalpha over CLalpha. [SET] -->
    <location name="AERORP" unit="IN"> <x> 469 </x> <y> 0 </y> <z> 0 </z> </location>
    <location name="EYEPOINT" unit="IN"> <x> 244 </x> <y> 0 </y> <z> 20 </z> </location>
    <location name="VRP" unit="IN"> <x> 0 </x> <y> 0 </y> <z> 0 </z> </location>
  </metrics>

  <!-- ============================== MASS AND INERTIA (recipe §3) ==============================
       THE INERTIA TENSOR IS PUBLISHED FOR NO ROW IN THIS CATALOGUE. It is [DERIVED] by the normalised
       radii of gyration of doc/modules/mig29/flight-model-spec.md §3.2, already published and applied
       once: take the pinned F-16's tensor, normalise each axis by its natural length
       (kx/b = 0.128, ky/L = 0.206, kz/((b+L)/2) = 0.263, Ixz/Izz = -0.0156), re-dimension on this row's
       own b = 14.01 m, L = 23.82 m and structural mass 20000 kg.
       TWIN-ENGINE CORRECTION, applied and declared: Ixx is raised by 10 %% for two podded
       engines outboard of the centreline, exactly as the MiG-29 deck took it.
       Ixx and the roll control power are the only two knobs that set roll acceleration; both are
       derived rather than measured, and they are the FIRST thing to re-derive if the measured roll
       response misses. -->
  <mass_balance negated_crossproduct_inertia="true">
    <ixx unit="SLUG*FT2"> 52182 </ixx>
    <iyy unit="SLUG*FT2"> 355178 </iyy>
    <izz unit="SLUG*FT2"> 365050 </izz>
    <ixy unit="SLUG*FT2"> 0 </ixy>
    <ixz unit="SLUG*FT2"> -5695 </ixz>
    <iyz unit="SLUG*FT2"> 0 </iyz>

    <emptywt unit="LBS"> 44092 </emptywt>
    <location name="CG" unit="IN"> <x> 469 </x> <y> 0 </y> <z> 0 </z> </location>

    <!-- [SET] 100 kg pilot + kit as ONE point mass, mirroring the F-16 and MiG-29 decks. -->
    <pointmass name="Pilot">
      <weight unit="LBS"> 220 </weight>
      <location unit="IN"> <x> 244 </x> <y> 0 </y> <z> 0 </z> </location>
    </pointmass>
  </mass_balance>

  <ground_reactions>
    <!-- [ANALOGY] stations from the row's own length and span; spring/damping scaled from the pinned
         F-16's by the structural-mass ratio; friction is the F-16 deck's own. -->
    <contact type="BOGEY" name="NOSE_LG">
      <location unit="IN"> <x> 262.6 </x> <y> 0.0 </y> <z> -121.9 </z> </location>
      <static_friction> 0.8 </static_friction>
      <dynamic_friction> 0.5 </dynamic_friction>
      <rolling_friction> 0.02 </rolling_friction>
      <spring_coeff unit="LBS/FT"> 50678 </spring_coeff>
      <damping_coeff unit="LBS/FT/SEC"> 12669 </damping_coeff>
      <max_steer unit="DEG"> 30 </max_steer>
      <brake_group> NOSE </brake_group>
      <retractable>1</retractable>
    </contact>
    <contact type="BOGEY" name="LEFT_MLG">
      <location unit="IN"> <x> 494.8 </x> <y> -132.4 </y> <z> -121.9 </z> </location>
      <static_friction> 0.8 </static_friction>
      <dynamic_friction> 0.5 </dynamic_friction>
      <rolling_friction> 0.02 </rolling_friction>
      <spring_coeff unit="LBS/FT"> 50678 </spring_coeff>
      <damping_coeff unit="LBS/FT/SEC"> 12669 </damping_coeff>
      <max_steer unit="DEG"> 0 </max_steer>
      <brake_group> LEFT </brake_group>
      <retractable>1</retractable>
    </contact>
    <contact type="BOGEY" name="RIGHT_MLG">
      <location unit="IN"> <x> 494.8 </x> <y> 132.4 </y> <z> -121.9 </z> </location>
      <static_friction> 0.8 </static_friction>
      <dynamic_friction> 0.5 </dynamic_friction>
      <rolling_friction> 0.02 </rolling_friction>
      <spring_coeff unit="LBS/FT"> 50678 </spring_coeff>
      <damping_coeff unit="LBS/FT/SEC"> 12669 </damping_coeff>
      <max_steer unit="DEG"> 0 </max_steer>
      <brake_group> RIGHT </brake_group>
      <retractable>1</retractable>
    </contact>
    <!-- The tail bumper sits ON the reference line and 0.90 L aft, so it clears the gear at any
         rotation attitude below ~16 deg. Measured, and it cost this recipe a takeoff run of 4 643 m
         against a published 610: with the bumper at 0.95 L and 0.07 L BELOW the line, the aeroplane
         struck its own tail before it reached its rotation attitude and never flew. -->
    <contact type="STRUCTURE" name="TAIL">
      <location unit="IN"> <x> 844 </x> <y> 0 </y> <z> 0 </z> </location>
      <static_friction> 1.0 </static_friction>
      <dynamic_friction> 1.0 </dynamic_friction>
      <spring_coeff unit="LBS/FT"> 40000 </spring_coeff>
      <damping_coeff unit="LBS/FT/SEC"> 8000 </damping_coeff>
    </contact>
  </ground_reactions>

  <!-- ============================== PROPULSION (recipe §5) ============================== -->
  <propulsion>
    <engine file="R-15B-300">
      <feed>0</feed>
      <thruster file="R-15B-300-nozzle">
        <location unit="IN"> <x> 882 </x> <y> 30.3 </y> <z> -6 </z> </location>
        <orient unit="DEG"> <roll> 0.0 </roll> <pitch> 0.0 </pitch> <yaw> 0.0 </yaw> </orient>
      </thruster>
    </engine>
    <engine file="R-15B-300">
      <feed>0</feed>
      <thruster file="R-15B-300-nozzle">
        <location unit="IN"> <x> 882 </x> <y> -30.3 </y> <z> -6 </z> </location>
        <orient unit="DEG"> <roll> 0.0 </roll> <pitch> 0.0 </pitch> <yaw> 0.0 </yaw> </orient>
      </thruster>
    </engine>
    <!-- ONE tank at the published internal capacity (A6 14570 kg = 32121 lb [T4]) on JSBSim's
         own starvation model. Feed order is [SET] and the CG travel it implies is declared, not
         modelled — no source gives a sequence for any row in this catalogue. -->
    <tank type="FUEL">
      <location unit="IN"> <x> 469 </x> <y> 0 </y> <z> 0 </z> </location>
      <capacity unit="LBS"> 32121 </capacity> <contents unit="LBS"> 32121 </contents>
    </tank>
  </propulsion>

  <!-- ============================== FLIGHT CONTROL (recipe §6) ==============================
       THIS IS A RAW AIRFRAME. There is no FLCS inside this deck and no fcs/fbw-override to bypass:
       systems/FBFlightControl wraps it from the OUTSIDE on the Manual/raw path that already exists and
       was already hardened for the MiG-29. The g limit (A5 = 4.5) and the alpha limiter live THERE and
       not here, for the three reasons doc/modules/mig29/flight-model-spec.md §7.3 gives — the limiter
       is a force effect, it must be overridable, and burying it here would hide it from
       core/FBFlightMonitor, whose whole point is that the limiter is not the judge. -->
  <flight_control name="MiG-25PD conventional FCS">
    <channel name="Pitch">
      <summer name="fcs/pitch-stick-plus-trim">
        <input>fcs/elevator-cmd-norm</input>
        <input>fcs/pitch-trim-cmd-norm</input>
        <clipto> <min>-1.0</min> <max>1.0</max> </clipto>
      </summer>
      <aerosurface_scale name="fcs/elevator-control">
        <input>fcs/pitch-stick-plus-trim</input>
        <range> <min>-0.4363323129985824</min> <max>0.4363323129985824</max> </range>
        <output>fcs/elevator-pos-rad</output>
      </aerosurface_scale>
    </channel>
    <channel name="Roll">
      <summer name="fcs/roll-stick-plus-trim">
        <input>fcs/aileron-cmd-norm</input>
        <input>fcs/roll-trim-cmd-norm</input>
        <clipto> <min>-1.0</min> <max>1.0</max> </clipto>
      </summer>
      <aerosurface_scale name="fcs/aileron-control">
        <input>fcs/roll-stick-plus-trim</input>
        <range> <min>-0.3491</min> <max>0.3491</max> </range>
        <output>fcs/left-aileron-pos-rad</output>
      </aerosurface_scale>
      <aerosurface_scale name="fcs/aileron-control-right">
        <input>fcs/roll-stick-plus-trim</input>
        <range> <min>-0.3491</min> <max>0.3491</max> </range>
        <output>fcs/right-aileron-pos-rad</output>
      </aerosurface_scale>
    </channel>
    <channel name="Yaw">
      <summer name="fcs/rudder-stick-plus-trim">
        <input>fcs/rudder-cmd-norm</input>
        <input>fcs/yaw-trim-cmd-norm</input>
        <clipto> <min>-1.0</min> <max>1.0</max> </clipto>
      </summer>
      <aerosurface_scale name="fcs/rudder-control">
        <input>fcs/rudder-stick-plus-trim</input>
        <range> <min>-0.5236</min> <max>0.5236</max> </range>
        <output>fcs/rudder-pos-rad</output>
      </aerosurface_scale>
    </channel>
    <!-- SAME CONVENTION AS THE PINNED F-16 AND THE MiG-29 DECKS, deliberately: throttle-pos =
         2 x throttle-cmd, so 0.5 is military and 1.0 is maximum augmentation. FlightBox commands ONE
         lever (fdm/FBFdm::SetControls writes fcs/throttle-cmd-norm in [0,1]), so a deck without this
         channel can never light its afterburner at all — measured, and it cost this recipe its first
         set of anchor runs. The channel FANS THE ONE LEVER OUT to every engine position; engine-
         differential throttle is not a FlightBox control and no channel produces it. -->
    <channel name="Throttle">
      <pure_gain name="fcs/throttle-0">
        <input>fcs/throttle-cmd-norm</input>
        <gain>2.0</gain>
        <output>fcs/throttle-pos-norm[0]</output>
      </pure_gain>
      <pure_gain name="fcs/throttle-1">
        <input>fcs/throttle-cmd-norm</input>
        <gain>2.0</gain>
        <output>fcs/throttle-pos-norm[1]</output>
      </pure_gain>
    </channel>

    <channel name="Flaps">
      <kinematic name="fcs/flap-control">
        <input>fcs/flap-cmd-norm</input>
        <traverse> <setting> <position>0</position> <time>0</time> </setting>
                   <setting> <position>0.4363</position> <time>4</time> </setting> </traverse>
        <output>fcs/flap-pos-rad</output>
      </kinematic>
    </channel>
    <channel name="Speedbrake">
      <kinematic name="fcs/speedbrake-control">
        <input>fcs/speedbrake-cmd-norm</input>
        <traverse> <setting> <position>0</position> <time>0</time> </setting>
                   <setting> <position>1</position> <time>1.5</time> </setting> </traverse>
        <output>fcs/speedbrake-pos-norm</output>
      </kinematic>
    </channel>
    <channel name="Landing Gear">
      <kinematic name="fcs/gear-control">
        <input>gear/gear-cmd-norm</input>
        <traverse> <setting> <position>0</position> <time>0</time> </setting>
                   <setting> <position>1</position> <time>6</time> </setting> </traverse>
        <output>gear/gear-pos-norm</output>
      </kinematic>
    </channel>
  </flight_control>

  <!-- ============================== AERODYNAMICS (recipe §4) ============================== -->
  <aerodynamics>
    <!-- GROUND EFFECT [ANALOGY], the pinned F-16 deck's kCLge table (NASA H-1999/H-2177 — a real
         measured shape, of another aircraft). LIFT ONLY, as that deck does. -->
    <function name="aero/function/kCLge">
      <table>
        <independentVar>aero/h_b-mac-ft</independentVar>
        <tableData>
          0.0000  1.2290
          0.1500  1.1160
          0.3000  1.1050
          0.5000  1.0340
          0.7000  1.0080
          1.0000  1.0000
          1.1000  1.0000
        </tableData>
      </table>
    </function>
    <!-- COMPRESSIBILITY ON LIFT [GEO]: Prandtl-Glauert growth to the transonic peak, then the
         supersonic 4/sqrt(M^2-1) decay limited by the finite aspect ratio. -->
    <function name="aero/function/kCLmach">
      <table>
        <independentVar>velocities/mach</independentVar>
        <tableData>
          0.00  1.00
          0.85  1.10
          0.95  1.20
          1.05  1.25
          1.20  1.15
          1.60  0.85
          2.00  0.70
          3.20  0.55
        </tableData>
      </table>
    </function>

    <axis name="LIFT">
      <!-- CLalpha = 2*pi*A/(2+sqrt(A^2+4)) = 3.481 /rad at AR 3.197 [GEO, Helmbold]. NO SWEEP
           TERM: leading-edge sweep is not published for a single deck row (recipe §4.1 rejects
           Raymer's relation for exactly that reason), so the zero-sweep form is used and the resulting
           overestimate at high sweep is DECLARED rather than patched with ten invented angles.
           CLmax = 0.796 [SET from the alpha limit — no landing or stall speed is published, so THIS ROW HAS NO TAKEOFF-RUN ANCHOR AND SPAWNS AIRBORNE (recipe §4.5)]. -->
      <function name="aero/coefficient/CLalpha">
        <description>Lift due to alpha</description>
        <product>
          <property>aero/qbar-psf</property>
          <property>metrics/Sw-sqft</property>
          <property>aero/function/kCLge</property>
          <property>aero/function/kCLmach</property>
          <table>
            <independentVar>aero/alpha-rad</independentVar>
            <tableData>
                -0.4363    -0.6415
                -0.3491    -0.7123
                -0.2618    -0.7831
                -0.1745    -0.5862
                -0.1222    -0.4179
                -0.0873    -0.3010
                -0.0698    -0.2416
                -0.0524    -0.1817
                -0.0349    -0.1213
                -0.0175    -0.0607
                 0.0000     0.0000
                 0.0175     0.0607
                 0.0349     0.1213
                 0.0524     0.1817
                 0.0698     0.2416
                 0.0873     0.3010
                 0.1222     0.4179
                 0.1745     0.5862
                 0.2094     0.6924
                 0.2618     0.7831
                 0.2967     0.7548
                 0.3491     0.7123
                 0.4363     0.6415
                 0.5236     0.5707
                 0.6109     0.4999
                 0.6981     0.4291
                 0.7854     0.3583
            </tableData>
          </table>
        </product>
      </function>
      <!-- [GEO] CLde = (S_h/S) * CLa_h * eta = 0.20 * 2.4 * 0.9 = 0.432 /rad. -->
      <function name="aero/coefficient/CLde">
        <description>Lift due to elevator</description>
        <product>
          <property>aero/qbar-psf</property>
          <property>metrics/Sw-sqft</property>
          <property>aero/function/kCLge</property>
          <property>fcs/elevator-pos-rad</property>
          <value> 0.432 </value>
        </product>
      </function>
      <!-- [SET] 0.60 /rad of trailing-edge flap, the single-slotted increment of a fighter flap of
           ~8 % of the reference area. Where a landing speed is published the SUM is INV against it. -->
      <function name="aero/coefficient/CLflaps">
        <description>Lift due to flaps</description>
        <product>
          <property>aero/qbar-psf</property>
          <property>metrics/Sw-sqft</property>
          <property>aero/function/kCLge</property>
          <property>fcs/flap-pos-rad</property>
          <value> 0.600 </value>
        </product>
      </function>
      <!-- [GEO] CLq ~ 2*eta*CLa_h*V_H + wing = 3.2 /rad at the recipe's [SET] tail volume. -->
      <function name="aero/coefficient/CLq">
        <description>Lift due to pitch rate</description>
        <product>
          <property>aero/qbar-psf</property>
          <property>metrics/Sw-sqft</property>
          <property>aero/ci2vel</property>
          <property>velocities/q-aero-rad_sec</property>
          <value> 3.2 </value>
        </product>
      </function>
    </axis>

    <axis name="DRAG">
      <!-- ZERO-LIFT DRAG vs MACH — where recipe §0 puts ALL the residual error of the frozen thrust
           analogy. The provenance of every knot is in this file's header. -->
      <function name="aero/coefficient/CD0">
        <description>Zero-lift drag vs Mach</description>
        <product>
          <property>aero/qbar-psf</property>
          <property>metrics/Sw-sqft</property>
          <table>
            <independentVar>velocities/mach</independentVar>
            <tableData>
                   0.00    0.02000
                   0.60    0.02000
                   0.85    0.02094
                   0.95    0.03070
                   1.05    0.04838
                   1.06    0.04838
                   3.10    0.03445
            </tableData>
          </table>
        </product>
      </function>
      <!-- LIFT-DEPENDENT DRAG, and it is written AGAINST THE LIFT COEFFICIENT THE DECK ACTUALLY
           PRODUCES (aero/cl-squared) and not against alpha. k = 1/(pi*AR*e) = 0.1509 with e = 0.66
           [DERIVED, recipe §4.1 — the F-5E's published CD0/(L/D)max pair, generalised, and the FIRST
           term the attribution band sweeps]. Past the linear range leading-edge suction is
           progressively lost, and only THAT part is a function of attitude:
             CDi = k*CL^2*(1-f(a)) + f(a)*CL*tan(a),   f = min(1, (a/30deg)^1.5)   [ANALOGY]
           MEASURED, and the reason the split exists: with the whole term tabulated in alpha the deck
           charged 2.9x the polar's own induced drag at a supersonic dash attitude, because a parabola
           sampled every 5 deg is read as a chord at 1.8 deg AND because kCLmach's lift loss reappears
           as extra alpha. Neither is a property of the aeroplane; both moved A1. -->
      <function name="aero/coefficient/CDi">
        <description>Induced drag on the lift actually produced</description>
        <product>
          <property>aero/qbar-psf</property>
          <property>metrics/Sw-sqft</property>
          <property>aero/cl-squared</property>
          <value> 0.150868 </value>
          <table>
            <independentVar>aero/alpha-rad</independentVar>
            <tableData>
                -0.4363    0.23927
                -0.3491    0.45567
                -0.2618    0.64645
                -0.1745    0.80755
                -0.1222    0.88729
                -0.0873    0.93196
                -0.0698    0.95131
                -0.0524    0.96838
                -0.0349    0.98279
                -0.0175    0.99391
                 0.0000    1.00000
                 0.0175    0.99391
                 0.0349    0.98279
                 0.0524    0.96838
                 0.0698    0.95131
                 0.0873    0.93196
                 0.1222    0.88729
                 0.1745    0.80755
                 0.2094    0.74702
                 0.2618    0.64645
                 0.2967    0.57343
                 0.3491    0.45567
                 0.4363    0.23927
                 0.5236    0.00000
                 0.6109    0.00000
                 0.6981    0.00000
                 0.7854    0.00000
            </tableData>
          </table>
        </product>
      </function>
      <function name="aero/coefficient/CDsuction">
        <description>Leading-edge suction lost past the linear range</description>
        <product>
          <property>aero/qbar-psf</property>
          <property>metrics/Sw-sqft</property>
          <table>
            <independentVar>aero/alpha-rad</independentVar>
            <tableData>
                -0.4363    0.22756
                -0.3491    0.14112
                -0.2618    0.07418
                -0.1745    0.01989
                -0.1222    0.00578
                -0.0873    0.00179
                -0.0698    0.00082
                -0.0524    0.00030
                -0.0349    0.00007
                -0.0175    0.00001
                 0.0000    0.00000
                 0.0175    0.00001
                 0.0349    0.00007
                 0.0524    0.00030
                 0.0698    0.00082
                 0.0873    0.00179
                 0.1222    0.00578
                 0.1745    0.01989
                 0.2094    0.03723
                 0.2618    0.07418
                 0.2967    0.09843
                 0.3491    0.14112
                 0.4363    0.22756
                 0.5236    0.32949
                 0.6109    0.35003
                 0.6981    0.36006
                 0.7854    0.35830
            </tableData>
          </table>
        </product>
      </function>
      <!-- [SET] trim drag 0.15*de^2; gear 0.020; flaps 0.08/rad; speedbrake 0.035 — the pinned F-16
           deck's own magnitudes, which are the only measured ones in the tree. -->
      <function name="aero/coefficient/CDde">
        <description>Drag due to elevator deflection</description>
        <product>
          <property>aero/qbar-psf</property>
          <property>metrics/Sw-sqft</property>
          <value> 0.15 </value>
          <property>fcs/elevator-pos-rad</property>
          <property>fcs/elevator-pos-rad</property>
        </product>
      </function>
      <function name="aero/coefficient/CDgear">
        <description>Drag due to gear</description>
        <product>
          <property>aero/qbar-psf</property>
          <property>metrics/Sw-sqft</property>
          <property>gear/gear-pos-norm</property>
          <value> 0.020 </value>
        </product>
      </function>
      <function name="aero/coefficient/CDflaps">
        <description>Drag due to flaps</description>
        <product>
          <property>aero/qbar-psf</property>
          <property>metrics/Sw-sqft</property>
          <property>fcs/flap-pos-rad</property>
          <value> 0.080 </value>
        </product>
      </function>
      <function name="aero/coefficient/CDsb">
        <description>Drag due to speedbrake</description>
        <product>
          <property>aero/qbar-psf</property>
          <property>metrics/Sw-sqft</property>
          <property>fcs/speedbrake-pos-norm</property>
          <value> 0.035 </value>
        </product>
      </function>
    </axis>

    <axis name="SIDE">
      <!-- [GEO] CYb = -CLa_v * (S_v/S) * eta = -2.0 * 0.15 * 0.9 = -0.27 /rad; CYdr = +0.14 /rad. -->
      <function name="aero/coefficient/CYb">
        <description>Side force due to beta</description>
        <product>
          <property>aero/qbar-psf</property>
          <property>metrics/Sw-sqft</property>
          <property>aero/beta-rad</property>
          <value> -0.270 </value>
        </product>
      </function>
      <function name="aero/coefficient/CYdr">
        <description>Side force due to rudder</description>
        <product>
          <property>aero/qbar-psf</property>
          <property>metrics/Sw-sqft</property>
          <property>fcs/rudder-pos-rad</property>
          <value> 0.140 </value>
        </product>
      </function>
    </axis>

    <axis name="ROLL">
      <!-- [SET/GEO] dihedral effect Clb -0.08 /rad, roll damping Clp -0.32, Clr +0.12, aileron power
           Clda 0.071 /rad (a strip integration of a 25 %-semispan aileron pair at the recipe's
           [SET] surface travel), rudder cross-coupling Cldr +0.010. Clda and Ixx are the only two
           numbers that set roll acceleration — doc/pilot.md's close-combat law INVERTS the resulting
           roll plant, which is why step 7 of the recipe MEASURES it and the tier gate reads the
           measurement rather than this line. -->
      <function name="aero/coefficient/Clb">
        <description>Roll moment due to beta</description>
        <product>
          <property>aero/qbar-psf</property><property>metrics/Sw-sqft</property>
          <property>metrics/bw-ft</property><property>aero/beta-rad</property>
          <value> -0.080 </value>
        </product>
      </function>
      <function name="aero/coefficient/Clp">
        <description>Roll damping</description>
        <product>
          <property>aero/qbar-psf</property><property>metrics/Sw-sqft</property>
          <property>metrics/bw-ft</property><property>aero/bi2vel</property>
          <property>velocities/p-aero-rad_sec</property>
          <value> -0.320 </value>
        </product>
      </function>
      <function name="aero/coefficient/Clr">
        <description>Roll moment due to yaw rate</description>
        <product>
          <property>aero/qbar-psf</property><property>metrics/Sw-sqft</property>
          <property>metrics/bw-ft</property><property>aero/bi2vel</property>
          <property>velocities/r-aero-rad_sec</property>
          <value> 0.120 </value>
        </product>
      </function>
      <function name="aero/coefficient/Clda">
        <description>Roll moment due to aileron</description>
        <product>
          <property>aero/qbar-psf</property><property>metrics/Sw-sqft</property>
          <property>metrics/bw-ft</property><property>fcs/left-aileron-pos-rad</property>
          <value> 0.0710 </value>
        </product>
      </function>
      <function name="aero/coefficient/Cldr">
        <description>Roll moment due to rudder</description>
        <product>
          <property>aero/qbar-psf</property><property>metrics/Sw-sqft</property>
          <property>metrics/bw-ft</property><property>fcs/rudder-pos-rad</property>
          <value> 0.010 </value>
        </product>
      </function>
    </axis>

    <axis name="PITCH">
      <!-- Cmalpha = -0.05 * CLalpha = -0.1740 /rad [SET static margin, 5 % of the mean
           geometric chord — no row publishes one, and a stable margin is what a conventional airframe
           of this era has]. Cmde = -0.9862 /rad is [GEO] from THIS row's own tail volume,
           -CLa_h*(S_h/S)*(l_h/cbar)*eta, the same surface that produces CLde = 0.432 one axis up.
           IT IS NO LONGER INVERTED AGAINST A5: that inversion sized the elevator to barely TRIM the
           alpha limit at full travel and could not lift a nose off a runway — measured, a take-off run
           of 1 403 m against a published 610 with full aft stick held from 167 to 226 kt. Rotation at
           Vr = 1.15*Vs needs |Cmde| >= 0.000/rad here; this deck carries 0.986. -->
      <function name="aero/coefficient/Cm">
        <description>Pitch moment due to alpha</description>
        <product>
          <property>aero/qbar-psf</property><property>metrics/Sw-sqft</property>
          <property>metrics/cbarw-ft</property><property>aero/alpha-rad</property>
          <value> -0.1740 </value>
        </product>
      </function>
      <function name="aero/coefficient/Cmde">
        <description>Pitch moment due to elevator</description>
        <product>
          <property>aero/qbar-psf</property><property>metrics/Sw-sqft</property>
          <property>metrics/cbarw-ft</property><property>fcs/elevator-pos-rad</property>
          <value> -0.9862 </value>
        </product>
      </function>
      <function name="aero/coefficient/Cmq">
        <description>Pitch damping</description>
        <product>
          <property>aero/qbar-psf</property><property>metrics/Sw-sqft</property>
          <property>metrics/cbarw-ft</property><property>aero/ci2vel</property>
          <property>velocities/q-aero-rad_sec</property>
          <value> -12.0 </value>
        </product>
      </function>
      <function name="aero/coefficient/Cmadot">
        <description>Pitch moment due to alpha rate</description>
        <product>
          <property>aero/qbar-psf</property><property>metrics/Sw-sqft</property>
          <property>metrics/cbarw-ft</property><property>aero/ci2vel</property>
          <property>aero/alphadot-rad_sec</property>
          <value> -4.0 </value>
        </product>
      </function>
    </axis>

    <axis name="YAW">
      <!-- [GEO] Cnb = +CLa_v*(S_v/S)*(l_v/b)*eta = 2.0*0.15*0.680*0.9 = 0.1836 /rad — weathercock
           stability from the row's own fin arm over its own span. Cnr -0.35, Cnp -0.06,
           Cndr -0.1102 /rad, Cnda +0.004 (adverse yaw). -->
      <function name="aero/coefficient/Cnb">
        <description>Yaw moment due to beta</description>
        <product>
          <property>aero/qbar-psf</property><property>metrics/Sw-sqft</property>
          <property>metrics/bw-ft</property><property>aero/beta-rad</property>
          <value> 0.1836 </value>
        </product>
      </function>
      <function name="aero/coefficient/Cnr">
        <description>Yaw damping</description>
        <product>
          <property>aero/qbar-psf</property><property>metrics/Sw-sqft</property>
          <property>metrics/bw-ft</property><property>aero/bi2vel</property>
          <property>velocities/r-aero-rad_sec</property>
          <value> -0.350 </value>
        </product>
      </function>
      <function name="aero/coefficient/Cnp">
        <description>Yaw moment due to roll rate</description>
        <product>
          <property>aero/qbar-psf</property><property>metrics/Sw-sqft</property>
          <property>metrics/bw-ft</property><property>aero/bi2vel</property>
          <property>velocities/p-aero-rad_sec</property>
          <value> -0.060 </value>
        </product>
      </function>
      <function name="aero/coefficient/Cndr">
        <description>Yaw moment due to rudder</description>
        <product>
          <property>aero/qbar-psf</property><property>metrics/Sw-sqft</property>
          <property>metrics/bw-ft</property><property>fcs/rudder-pos-rad</property>
          <value> -0.1102 </value>
        </product>
      </function>
      <function name="aero/coefficient/Cnda">
        <description>Adverse yaw due to aileron</description>
        <product>
          <property>aero/qbar-psf</property><property>metrics/Sw-sqft</property>
          <property>metrics/bw-ft</property><property>fcs/left-aileron-pos-rad</property>
          <value> 0.0040 </value>
        </product>
      </function>
    </axis>
  </aerodynamics>

</fdm_config>
